<?xml version="1.0" encoding="UTF-8"?>
<networkml xmlns="http://morphml.org/networkml/schema" xmlns:meta="http://morphml.org/metadata/schema" xmlns:xsi="http://www.w3.org/2001/XMLSchema-instance" xsi:schemaLocation="http://morphml.org/networkml/schema  http://www.neuroml.org/NeuroMLValidator/NeuroMLFiles/Schemata/v1.8.1/Level3/NetworkML_v1.8.1.xsd" lengthUnits="micrometer">

<meta:notes>

Network structure (NeuroML 1.x) for project: VervaekeEtAl-GolgiCellNetwork saved with neuroConstruct v1.6.1 on: 18:54:11, 15-Nov-12

Cell Group: CellGroup_1 contains 45 cells

Network connection: NetConn_CellGroup_1_CellGroup_1 contains 470 individual synaptic connections

</meta:notes>

<meta:properties>
    <meta:property tag="neuroConstruct_random_seed" value="-1282919073"/>

    <meta:property tag="neuroConstruct_sim_config" value="Default Simulation Configuration"/>

    <meta:property tag="neuroConstruct_sim_duration" value="5000.0"/>

    <meta:property tag="neuroConstruct_sim_time_step" value="0.05"/>

    <meta:property tag="neuroConstruct_temperature" value="23.0"/>
</meta:properties>

        <populations>
    <population name="CellGroup_1" cell_type="Golgi_NeuroML">
        <meta:properties>

        </meta:properties>
        <instances size="45">
            <instance id="0" node_id="0">
                <location x="136.69319" y="48.998703" z="95.729996"/>
            </instance>
            <instance id="1" node_id="1">
                <location x="144.71184" y="25.318474" z="48.452816"/>
            </instance>
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        </instances>
    </population>
</populations>

        <projections units="Physiological Units">
    <projection name="NetConn_CellGroup_1_CellGroup_1" source="CellGroup_1" target="CellGroup_1">
        <synapse_props synapse_type="GapJuncCML" internal_delay="5.0" weight="292.96255" threshold="-20.0">
        </synapse_props>
        <connections size="470">
            <connection id="0" pre_cell_id="0" pre_segment_id="2990" pre_fraction_along="0.2701935" post_cell_id="32" post_segment_id="3508" post_fraction_along="0.8199283">
                <properties prop_delay="0.0" internal_delay="5.0" weight="296.0193"/>
            </connection>
            <connection id="1" pre_cell_id="0" pre_segment_id="3838" pre_fraction_along="0.15513821" post_cell_id="38" post_segment_id="3858" post_fraction_along="0.15343505">
                <properties prop_delay="0.0" internal_delay="5.0" weight="0.0"/>
            </connection>
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        </connections>
    </projection>
</projections>

        <inputs units="Physiological Units">
    <input name="Input_21">
        <random_stim frequency="0.002" synaptic_mechanism="MultiDecaySyn"/>
        <target population="CellGroup_1">
            <sites size="900">
                <site cell_id="0" segment_id="4312" fraction_along="0.2926254"/>
                <site cell_id="0" segment_id="4259" fraction_along="0.07514183"/>
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            </sites>
        </target>
    </input>
    <input name="Input_20">
        <random_stim frequency="5.0E-4" synaptic_mechanism="ApicalSyn"/>
        <target population="CellGroup_1">
            <sites size="4500">
                <site cell_id="0" segment_id="3775" fraction_along="0.46213663"/>
                <site cell_id="0" segment_id="3034" fraction_along="0.30142158"/>
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            </sites>
        </target>
    </input>
</inputs>

</networkml>
