<?xml version="1.0" encoding="UTF-8"?>

<neuroml xmlns=  "http://www.neuroml.org/schema/neuroml2" xmlns:xsi=  "http://www.w3.org/2001/XMLSchema-instance" xsi:schemaLocation = "http://www.neuroml.org/schema/neuroml2 https://raw.github.com/NeuroML/NeuroML2/master/Schemas/NeuroML2/NeuroML_v2beta.xsd" id = "naf2">

    <notes>ChannelML file based on Traub et al. 2003</notes>

    <ionChannel id = "naf2" conductance = "10pS" type = "ionChannelHH" species = "na">

        <notes>ChannelML file based on Traub et al. 2003</notes>

        <annotation>
            <rdf:RDF xmlns:rdf=  "http://www.w3.org/1999/02/22-rdf-syntax-ns#">
                <rdf:Description rdf:about = "naf2">

                    <bqmodel:isDescribedBy xmlns:bqmodel=  "http://biomodels.net/model-qualifiers/">
                        <rdf:Bag>
                            <rdf:li>Roger D. Traub, Eberhard H. Buhl, Tengis Gloveli, and Miles A. Whittington
Fast Rhythmic Bursting Can Be Induced in Layer 2/3 Cortical Neurons by Enhancing Persistent Na+ Conductance or by Blocking BK Channels
J Neurophysiol 89: 909-921, 2003</rdf:li>
                            <rdf:li rdf:resource = "http://www.ncbi.nlm.nih.gov/entrez/query.fcgi?cmd=Retrieve&amp;db=pubmed&amp;dopt=Abstract&amp;list_uids=12574468"/>
                        </rdf:Bag>
                    </bqmodel:isDescribedBy>

                    <bqmodel:isDescribedBy xmlns:bqmodel=  "http://biomodels.net/model-qualifiers/">
                        <rdf:Bag>
                            <rdf:li>Roger D. Traub, Diego Contreras, Mark O. Cunningham, Hilary Murray, Fiona E. N. LeBeau, Anita Roopun, Andrea Bibbig, W. Bryan Wilent, Michael J. Higley, and Miles A. Whittington
Single-column thalamocortical network model exhibiting gamma oscillations, sleep spindles, and epileptogenic bursts.
J. Neurophysiol. 93, 2194-2232, 2005</rdf:li>
                            <rdf:li rdf:resource = "http://www.ncbi.nlm.nih.gov/pubmed/15525801?dopt=Abstract"/>
                        </rdf:Bag>
                    </bqmodel:isDescribedBy>

                    <bqbiol:isVersionOf xmlns:bqbiol=  "http://biomodels.net/biology-qualifiers/">
                        <rdf:Bag>
                            <rdf:li>Na channels</rdf:li>
                            <rdf:li rdf:resource = "http://senselab.med.yale.edu/senselab/NeuronDB/channelGene2.htm#table2"/>
                        </rdf:Bag>
                    </bqbiol:isVersionOf>

                </rdf:Description>
            </rdf:RDF>
        </annotation>

        <gate id = "m" type = "gateHHtauInf" instances = "3">
            <timeCourse type = "naf2_m_tau_tau"/>
            <steadyState type = "naf2_m_inf_inf"/>
        </gate>

        <gate id = "h" type = "gateHHtauInf" instances = "1">
            <timeCourse type = "naf2_h_tau_tau"/>
            <steadyState type = "naf2_h_inf_inf"/>
        </gate>

    </ionChannel>

    <ComponentType name = "naf2_m_tau_tau" extends = "baseVoltageDepTime">
        <Constant name = "TIME_SCALE" dimension = "time" value = "1 ms"/>
        <Constant name = "VOLT_SCALE" dimension = "voltage" value = "1 mV"/>
        <Constant name = "fastNa_shift" dimension = "none" value = "0">
                <!-- Note: this parameter should instead be defined only once within the ionChannel! -->
        </Constant>
        <Constant name = "a" dimension = "none" value = "0">
                <!-- Note: this parameter should instead be defined only once within the ionChannel! -->
        </Constant>
        <Constant name = "b" dimension = "none" value = "0">
                <!-- Note: this parameter should instead be defined only once within the ionChannel! -->
        </Constant>
        <Constant name = "c" dimension = "none" value = "0">
                <!-- Note: this parameter should instead be defined only once within the ionChannel! -->
        </Constant>
        <Constant name = "d" dimension = "none" value = "0">
                <!-- Note: this parameter should instead be defined only once within the ionChannel! -->
        </Constant>

        <Dynamics>
            <DerivedVariable name = "V" dimension = "none" value = "v / VOLT_SCALE"/>
            <DerivedVariable name = "t" exposure = "t" dimension = "time" value = "( 0.0125 + 0.1525 * ( exp ( ((V + fastNa_shift) + 30) / 10) ) ) * TIME_SCALE" valueCondition = "( V + fastNa_shift )  .lt. ( -30 )" valueIfFalse = "( 0.02 + a + (0.145 + b) * ( exp ( -1 * ((V + fastNa_shift + d) + 30) / (10 + c)) )) * TIME_SCALE"/>
        </Dynamics>

    </ComponentType>

    <ComponentType name = "naf2_m_inf_inf" extends = "baseVoltageDepVariable">
        <Constant name = "TIME_SCALE" dimension = "time" value = "1 ms"/>
        <Constant name = "VOLT_SCALE" dimension = "voltage" value = "1 mV"/>
        <Constant name = "fastNa_shift" dimension = "none" value = "0">
                <!-- Note: this parameter should instead be defined only once within the ionChannel! -->
        </Constant>
        <Constant name = "a" dimension = "none" value = "0">
                <!-- Note: this parameter should instead be defined only once within the ionChannel! -->
        </Constant>
        <Constant name = "b" dimension = "none" value = "0">
                <!-- Note: this parameter should instead be defined only once within the ionChannel! -->
        </Constant>
        <Constant name = "c" dimension = "none" value = "0">
                <!-- Note: this parameter should instead be defined only once within the ionChannel! -->
        </Constant>
        <Constant name = "d" dimension = "none" value = "0">
                <!-- Note: this parameter should instead be defined only once within the ionChannel! -->
        </Constant>

        <Dynamics>
            <DerivedVariable name = "V" dimension = "none" value = "v / VOLT_SCALE"/>
            <DerivedVariable name = "x" exposure = "x" dimension = "none" value = " 1 / ( 1 + (exp ( ( -1 * (V + fastNa_shift) - 38) / 10)) ) "/>
        </Dynamics>

    </ComponentType>

    <ComponentType name = "naf2_h_tau_tau" extends = "baseVoltageDepTime">
        <Constant name = "TIME_SCALE" dimension = "time" value = "1 ms"/>
        <Constant name = "VOLT_SCALE" dimension = "voltage" value = "1 mV"/>
        <Constant name = "fastNa_shift" dimension = "none" value = "0">
                <!-- Note: this parameter should instead be defined only once within the ionChannel! -->
        </Constant>
        <Constant name = "a" dimension = "none" value = "0">
                <!-- Note: this parameter should instead be defined only once within the ionChannel! -->
        </Constant>
        <Constant name = "b" dimension = "none" value = "0">
                <!-- Note: this parameter should instead be defined only once within the ionChannel! -->
        </Constant>
        <Constant name = "c" dimension = "none" value = "0">
                <!-- Note: this parameter should instead be defined only once within the ionChannel! -->
        </Constant>
        <Constant name = "d" dimension = "none" value = "0">
                <!-- Note: this parameter should instead be defined only once within the ionChannel! -->
        </Constant>

        <Dynamics>
            <DerivedVariable name = "V" dimension = "none" value = "v / VOLT_SCALE"/>
            <DerivedVariable name = "t" exposure = "t" dimension = "time" value = "(0.225 + 1.125 / ( 1 + ( exp (( ( V + fastNa_shift * 0 ) + 37 ) / 15) ) )) * TIME_SCALE"/>
        </Dynamics>

    </ComponentType>

    <ComponentType name = "naf2_h_inf_inf" extends = "baseVoltageDepVariable">
        <Constant name = "TIME_SCALE" dimension = "time" value = "1 ms"/>
        <Constant name = "VOLT_SCALE" dimension = "voltage" value = "1 mV"/>
        <Constant name = "fastNa_shift" dimension = "none" value = "0">
                <!-- Note: this parameter should instead be defined only once within the ionChannel! -->
        </Constant>
        <Constant name = "a" dimension = "none" value = "0">
                <!-- Note: this parameter should instead be defined only once within the ionChannel! -->
        </Constant>
        <Constant name = "b" dimension = "none" value = "0">
                <!-- Note: this parameter should instead be defined only once within the ionChannel! -->
        </Constant>
        <Constant name = "c" dimension = "none" value = "0">
                <!-- Note: this parameter should instead be defined only once within the ionChannel! -->
        </Constant>
        <Constant name = "d" dimension = "none" value = "0">
                <!-- Note: this parameter should instead be defined only once within the ionChannel! -->
        </Constant>

        <Dynamics>
            <DerivedVariable name = "V" dimension = "none" value = "v / VOLT_SCALE"/>
            <DerivedVariable name = "x" exposure = "x" dimension = "none" value = "1 / ( 1 + (exp (( ( V + fastNa_shift * 0 ) + 58.3 ) / 6.7)) )"/>
        </Dynamics>

    </ComponentType>

</neuroml>
