<?xml version="1.0" encoding="iso-8859-1"?>
<!--
    Example of a simple leak current specified in ChannelML.
    Taken from Michael Hines's initial proposal
-->
<neuroml xmlns:org.4suite.4xslt.ns0="http://www.w3.org/2001/XMLSchema-instance" xmlns="http://www.neuroml.org/schema/neuroml2" org.4suite.4xslt.ns0:schemaLocation="http://www.neuroml.org/schema/neuroml2 https://raw.github.com/NeuroML/NeuroML2/development/Schemas/NeuroML2/NeuroML_v2beta4.xsd" id="LeakConductance">

    <notes>ChannelML file containing a single Channel description</notes>

    <ionChannel conductance="10pS" type="ionChannelPassive" id="LeakConductance">

        <notes>Simple example of a leak/passive conductance. Note: for GENESIS cells with a single leak conductance,
        it is better to use the Rm and Em variables for a passive current.</notes>
                                    Not yet implemented....

    </ionChannel>

</neuroml>
