<neuroml xmlns="http://www.neuroml.org/schema/neuroml2"  xmlns:xs="http://www.w3.org/2001/XMLSchema" xmlns:xsi="http://www.w3.org/2001/XMLSchema-instance" xsi:schemaLocation="http://www.neuroml.org/schema/neuroml2 https://raw.github.com/NeuroML/NeuroML2/development/Schemas/NeuroML2/NeuroML_v2beta4.xsd" id="Channelpedia_Na_S_36">
    <ionChannelHH id="Channelpedia_Na_S_36" conductance="10pS" species="na">
        <notes>This is an automated conversion to NeuroML 2 of an ion channel model from Channelpedia.
The original channel model file can be found at: http://channelpedia.epfl.ch/ionchannels/189

Conversion scripts at https://github.com/OpenSourceBrain/BlueBrainProjectShowcase</notes>

        <annotation>
            <rdf:RDF xmlns:rdf="http://www.w3.org/1999/02/22-rdf-syntax-ns#" xmlns:bqmodel="http://biomodels.net/model-qualifiers/" xmlns:bqbiol="http://biomodels.net/biology-qualifiers/">
                <!-- Automatic conversion of Channelpedia XML file to NeuroML2
Uses: https://github.com/OpenSourceBrain/BlueBrainProjectShowcase/blob/master/Channelpedia/ChannelpediaToNeuroML2.py -->
                <rdf:Description rdf:about="Channelpedia_Na_S_36">
                    <bqmodel:isDerivedFrom>
                        <rdf:Bag>
                            <!-- Channelpedia channel ID: 189, ModelID: 36; direct link to original XML model -->
                            <rdf:li rdf:resource="http://channelpedia.epfl.ch/ionchannels/189/hhmodels/36.xml"/>
                        </rdf:Bag>
                    </bqmodel:isDerivedFrom>
                    <bqmodel:isDescribedBy>
                        <rdf:Bag>
                            <!-- Channelpedia channel ID: 189; link to main page for channel -->
                            <rdf:li rdf:resource="http://channelpedia.epfl.ch/ionchannels/189"/>
                        </rdf:Bag>
                    </bqmodel:isDescribedBy>
                    <bqmodel:isDescribedBy>
                        <rdf:Bag>
                            <!-- PubMed ID: 1668364 is referenced in original XML
                                 Patch-clamp studies of voltage-gated currents in identified neurons of the rat cerebral cortex. Cereb. Cortex, 1991, 1, 48-61 -->
                            <rdf:li rdf:resource="http://identifiers.org/pubmed/1668364"/>
                        </rdf:Bag>
                    </bqmodel:isDescribedBy>
                    <bqbiol:hasTaxon>
                        <rdf:Bag>
                            <!-- Known species: rat; taxonomy id: 10116 -->
                            <rdf:li rdf:resource="http://identifiers.org/taxonomy/10116"/>
                        </rdf:Bag>
                    </bqbiol:hasTaxon>
                </rdf:Description>
            </rdf:RDF>
        </annotation>

        <gate id="m" instances="3" type="gateHHrates">
            <forwardRate type="Channelpedia_Na_S_36_m_alpha"/>
            <reverseRate type="Channelpedia_Na_S_36_m_beta"/>
        </gate>
        <gate id="h" instances="1" type="gateHHtauInf">
            <timeCourse type="Channelpedia_Na_S_36_h_tau"/>
            <steadyState type="Channelpedia_Na_S_36_h_inf"/>
        </gate>
    </ionChannelHH>

    <ComponentType name="Channelpedia_Na_S_36_h_tau" extends="baseVoltageDepTime">
        <Constant name = "TIME_SCALE" value = "1 ms" dimension = "time"/>
        <Constant name = "VOLT_SCALE" value = "1 mV" dimension = "voltage"/>
        <Dynamics>
            <DerivedVariable name="V" dimension="none" value="v / VOLT_SCALE"/>
            <DerivedVariable name="t" dimension="time" exposure="t" value="(1/((0.024 * ((V-10)+50))/(1-(exp(-((V-10)+50)/5))) +(0.0091 * (-(V-10) - 75.000123))/(1-(exp(-(-(V-10) - 75.000123)/5))))) * TIME_SCALE"/>
        </Dynamics>
    </ComponentType>

    <ComponentType name="Channelpedia_Na_S_36_h_inf" extends="baseVoltageDepVariable">
        <Constant name = "TIME_SCALE" value = "1 ms" dimension = "time"/>
        <Constant name = "VOLT_SCALE" value = "1 mV" dimension = "voltage"/>
        <Dynamics>
            <DerivedVariable name="V" dimension="none" value="v / VOLT_SCALE"/>
            <DerivedVariable name="x" dimension="none" exposure="x" value="1.0/(1+exp((V+65-10)/6.2))"/>
        </Dynamics>
    </ComponentType>

    <ComponentType name="Channelpedia_Na_S_36_m_alpha" extends="baseVoltageDepRate">
        <Constant name = "TIME_SCALE" value = "1 ms" dimension = "time"/>
        <Constant name = "VOLT_SCALE" value = "1 mV" dimension = "voltage"/>
        <Dynamics>
            <DerivedVariable name="V" dimension="none" value="v / VOLT_SCALE"/>
            <DerivedVariable name="r" dimension="per_time" exposure="r" value="(0.182 * ((V-10)+35))/(1-(exp(-((V-10)+35)/9))) / TIME_SCALE"/>
        </Dynamics>
    </ComponentType>

    <ComponentType name="Channelpedia_Na_S_36_m_beta" extends="baseVoltageDepRate">
        <Constant name = "TIME_SCALE" value = "1 ms" dimension = "time"/>
        <Constant name = "VOLT_SCALE" value = "1 mV" dimension = "voltage"/>
        <Dynamics>
            <DerivedVariable name="V" dimension="none" value="v / VOLT_SCALE"/>
            <DerivedVariable name="r" dimension="per_time" exposure="r" value="(0.124 * (-(V-10) -35))/(1-(exp(-(-(V-10) -35)/9)))  / TIME_SCALE"/>
        </Dynamics>
    </ComponentType>

</neuroml>
