<?xml version="1.0" encoding="UTF-8"?>
<neuroml xmlns="http://www.neuroml.org/schema/neuroml2" xmlns:xsi="http://www.w3.org/2001/XMLSchema-instance" xsi:schemaLocation="http://www.neuroml.org/schema/neuroml2  https://raw.githubusercontent.com/NeuroML/NeuroML2/development/Schemas/NeuroML2/NeuroML_v2beta4.xsd" id="purk2">

    <include href="Leak.channel.nml"/>

    <cell id="purk2">

        <notes>Cell: soma exported from NEURON ModelView</notes>

        <morphology id="morphology_purk2">

            <segment id="0" name="Seg0_soma">
                <proximal x="0.0" y="0.0" z="0.0" diameter="29.8"/>
                <distal x="0.0" y="0.0" z="0.0" diameter="29.8"/>
            </segment>

            <segment id="1" name="Seg0_dend_0">
                <parent segment="0" fractionAlong="1"/>
                <proximal x="0.0" y="0.0" z="0.0" diameter="7.72"/>
                <distal x="5.557" y="9.447" z="-9.4470005" diameter="7.72"/>
            </segment>

            <segment id="2" name="Seg0_dend_1">
                <parent segment="1"/>
                <proximal x="5.557" y="9.447" z="-9.4470005" diameter="8.22"/>
                <distal x="13.983" y="31.356" z="-10.571003" diameter="8.22"/>
            </segment>

            <segment id="70" name="Seg0_dend_69">
                <parent segment="2"/>
                <proximal x="13.983" y="31.356" z="-10.571003" diameter="5.28"/>
                <distal x="20.093" y="30.801" z="-11.126003" diameter="5.28"/>
            </segment>

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
            <segmentGroup id="soma" neuroLexId="sao864921383">    <!--
                This group contains an unbranched set of segments, and all of the segmentGroups marked with
                neuroLexId = sao864921383 form a non-overlapping set of all of the segments.
                These segmentGroups correspond to the 'cables' of NeuroML v1.8.1. -->

                <member segment="0"/>
            </segmentGroup>

            <segmentGroup id="dend_0" neuroLexId="sao864921383">    <!--
                This group contains an unbranched set of segments, and all of the segmentGroups marked with
                neuroLexId = sao864921383 form a non-overlapping set of all of the segments.
                These segmentGroups correspond to the 'cables' of NeuroML v1.8.1. -->

                <member segment="1"/>
            </segmentGroup>

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
            <segmentGroup id="ModelViewParmSubset_4">
                <include segmentGroup="soma"/>
                <include segmentGroup="dend_0"/>
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            </segmentGroup>

            <segmentGroup id="OneSecGrp_SectionRef_1">
                <include segmentGroup="soma"/>
            </segmentGroup>

            <segmentGroup id="dendrite_group" neuroLexId="GO:0030425">    <!--Dendrite group-->

                <include segmentGroup="dend_0"/>
                <include segmentGroup="dend_1"/>
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            </segmentGroup>

            <segmentGroup id="ModelViewParmSubset_2">
                <include segmentGroup="dend_0"/>
                <include segmentGroup="dend_1"/>
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            </segmentGroup>

            <segmentGroup id="ModelViewParmSubset_85">
                <include segmentGroup="dend_0"/>
                <include segmentGroup="dend_1"/>
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            </segmentGroup>

            <segmentGroup id="ModelViewParmSubset_87">
                <include segmentGroup="dend_0"/>
                <include segmentGroup="dend_1"/>
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            </segmentGroup>

            <segmentGroup id="OneSecGrp_SectionRef_2">
                <include segmentGroup="dend_0"/>
            </segmentGroup>

            <segmentGroup id="OneSecGrp_SectionRef_3">
                <include segmentGroup="dend_1"/>
            </segmentGroup>

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
            <segmentGroup id="ModelViewParmSubset_20">
                <include segmentGroup="dend_70"/>
                <include segmentGroup="dend_402"/>
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            </segmentGroup>

            <segmentGroup id="ModelViewParmSubset_83">
                <include segmentGroup="dend_114"/>
                <include segmentGroup="dend_36"/>
                <include segmentGroup="dend_56"/>
            </segmentGroup>

            <segmentGroup id="OneSecGrp_SectionRef_8">
                <include segmentGroup="dend_3"/>
            </segmentGroup>

            <segmentGroup id="ModelViewParmSubset_28">
                <include segmentGroup="dend_71"/>
                <include segmentGroup="dend_307"/>
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            </segmentGroup>

            <segmentGroup id="ModelViewParmSubset_49">
                <include segmentGroup="dend_115"/>
                <include segmentGroup="dend_1283"/>
            </segmentGroup>

            <segmentGroup id="OneSecGrp_SectionRef_11">
                <include segmentGroup="dend_4"/>
            </segmentGroup>

            <segmentGroup id="ModelViewParmSubset_35">
                <include segmentGroup="dend_72"/>
                <include segmentGroup="dend_73"/>
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            </segmentGroup>

            <segmentGroup id="ModelViewParmSubset_16">
                <include segmentGroup="dend_129"/>
                <include segmentGroup="dend_371"/>
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            </segmentGroup>

            <segmentGroup id="ModelViewParmSubset_18">
                <include segmentGroup="dend_116"/>
                <include segmentGroup="dend_640"/>
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            </segmentGroup>

            <segmentGroup id="ModelViewParmSubset_84">
                <include segmentGroup="dend_5"/>
                <include segmentGroup="dend_8"/>
            </segmentGroup>

            <segmentGroup id="ModelViewParmSubset_39">
                <include segmentGroup="dend_100"/>
                <include segmentGroup="dend_93"/>
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            </segmentGroup>

            <segmentGroup id="ModelViewParmSubset_23">
                <include segmentGroup="dend_133"/>
                <include segmentGroup="dend_304"/>
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            </segmentGroup>

            <segmentGroup id="ModelViewParmSubset_27">
                <include segmentGroup="dend_130"/>
                <include segmentGroup="dend_117"/>
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            </segmentGroup>

            <segmentGroup id="OneSecGrp_SectionRef_21">
                <include segmentGroup="dend_300"/>
            </segmentGroup>

            <segmentGroup id="OneSecGrp_SectionRef_22">
                <include segmentGroup="dend_6"/>
            </segmentGroup>

            <segmentGroup id="ModelViewParmSubset_40">
                <include segmentGroup="dend_108"/>
                <include segmentGroup="dend_342"/>
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            </segmentGroup>

            <segmentGroup id="ModelViewParmSubset_43">
                <include segmentGroup="dend_101"/>
                <include segmentGroup="dend_103"/>
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            </segmentGroup>

            <segmentGroup id="ModelViewParmSubset_37">
                <include segmentGroup="dend_92"/>
                <include segmentGroup="dend_109"/>
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            </segmentGroup>

            <segmentGroup id="ModelViewParmSubset_31">
                <include segmentGroup="dend_134"/>
                <include segmentGroup="dend_377"/>
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            </segmentGroup>

            <segmentGroup id="ModelViewParmSubset_33">
                <include segmentGroup="dend_131"/>
                <include segmentGroup="dend_305"/>
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            </segmentGroup>

            <segmentGroup id="ModelViewParmSubset_29">
                <include segmentGroup="dend_118"/>
                <include segmentGroup="dend_119"/>
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            </segmentGroup>

            <segmentGroup id="ModelViewParmSubset_57">
                <include segmentGroup="dend_301"/>
                <include segmentGroup="dend_722"/>
                <include segmentGroup="dend_788"/>
            </segmentGroup>

            <segmentGroup id="ModelViewParmSubset_80">
                <include segmentGroup="dend_370"/>
                <include segmentGroup="dend_34"/>
                <include segmentGroup="dend_35"/>
                <include segmentGroup="dend_37"/>
            </segmentGroup>

            <segmentGroup id="OneSecGrp_SectionRef_33">
                <include segmentGroup="dend_7"/>
            </segmentGroup>

            <segmentGroup id="ModelViewParmSubset_12">
                <include segmentGroup="dend_354"/>
                <include segmentGroup="dend_663"/>
                <include segmentGroup="dend_1293"/>
                <include segmentGroup="dend_1007"/>
            </segmentGroup>

            <segmentGroup id="ModelViewParmSubset_54">
                <include segmentGroup="dend_302"/>
                <include segmentGroup="dend_1094"/>
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            </segmentGroup>

            <segmentGroup id="ModelViewParmSubset_19">
                <include segmentGroup="dend_400"/>
                <include segmentGroup="dend_232"/>
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            </segmentGroup>

            <segmentGroup id="ModelViewParmSubset_41">
                <include segmentGroup="dend_104"/>
                <include segmentGroup="dend_126"/>
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            </segmentGroup>

            <segmentGroup id="ModelViewParmSubset_42">
                <include segmentGroup="dend_94"/>
                <include segmentGroup="dend_111"/>
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            </segmentGroup>

            <segmentGroup id="ModelViewParmSubset_25">
                <include segmentGroup="dend_146"/>
                <include segmentGroup="dend_372"/>
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            </segmentGroup>

            <segmentGroup id="ModelViewParmSubset_36">
                <include segmentGroup="dend_136"/>
                <include segmentGroup="dend_137"/>
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            </segmentGroup>

            <segmentGroup id="ModelViewParmSubset_32">
                <include segmentGroup="dend_122"/>
                <include segmentGroup="dend_120"/>
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            </segmentGroup>

            <segmentGroup id="ModelViewParmSubset_38">
                <include segmentGroup="dend_355"/>
                <include segmentGroup="dend_105"/>
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            </segmentGroup>

            <segmentGroup id="ModelViewParmSubset_17">
                <include segmentGroup="dend_401"/>
                <include segmentGroup="dend_147"/>
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            </segmentGroup>

            <segmentGroup id="OneSecGrp_SectionRef_65">
                <include segmentGroup="dend_30"/>
            </segmentGroup>

            <segmentGroup id="OneSecGrp_SectionRef_66">
                <include segmentGroup="dend_9"/>
            </segmentGroup>

            <segmentGroup id="ModelViewParmSubset_46">
                <include segmentGroup="dend_97"/>
                <include segmentGroup="dend_95"/>
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            </segmentGroup>

            <segmentGroup id="ModelViewParmSubset_81">
                <include segmentGroup="dend_31"/>
                <include segmentGroup="dend_22"/>
            </segmentGroup>

            <segmentGroup id="ModelViewParmSubset_63">
                <include segmentGroup="dend_526"/>
                <include segmentGroup="dend_40"/>
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            </segmentGroup>

            <segmentGroup id="ModelViewParmSubset_78">
                <include segmentGroup="dend_10"/>
                <include segmentGroup="dend_33"/>
                <include segmentGroup="dend_49"/>
            </segmentGroup>

            <segmentGroup id="ModelViewParmSubset_34">
                <include segmentGroup="dend_106"/>
                <include segmentGroup="dend_404"/>
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            </segmentGroup>

            <segmentGroup id="ModelViewParmSubset_47">
                <include segmentGroup="dend_96"/>
                <include segmentGroup="dend_331"/>
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            </segmentGroup>

            <segmentGroup id="ModelViewParmSubset_15">
                <include segmentGroup="dend_148"/>
                <include segmentGroup="dend_1393"/>
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            </segmentGroup>

            <segmentGroup id="OneSecGrp_SectionRef_98">
                <include segmentGroup="dend_138"/>
            </segmentGroup>

            <segmentGroup id="ModelViewParmSubset_22">
                <include segmentGroup="dend_308"/>
                <include segmentGroup="dend_664"/>
                <include segmentGroup="dend_789"/>
                <include segmentGroup="dend_1009"/>
            </segmentGroup>

            <segmentGroup id="ModelViewParmSubset_56">
                <include segmentGroup="dend_1069"/>
                <include segmentGroup="dend_1177"/>
                <include segmentGroup="dend_1444"/>
            </segmentGroup>

            <segmentGroup id="ModelViewParmSubset_21">
                <include segmentGroup="dend_527"/>
                <include segmentGroup="dend_433"/>
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            </segmentGroup>

            <segmentGroup id="ModelViewParmSubset_74">
                <include segmentGroup="dend_11"/>
                <include segmentGroup="dend_52"/>
            </segmentGroup>

            <segmentGroup id="ModelViewParmSubset_24">
                <include segmentGroup="dend_530"/>
                <include segmentGroup="dend_217"/>
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            </segmentGroup>

            <segmentGroup id="ModelViewParmSubset_59">
                <include segmentGroup="dend_533"/>
                <include segmentGroup="dend_1135"/>
                <include segmentGroup="dend_26"/>
            </segmentGroup>

            <segmentGroup id="ModelViewParmSubset_71">
                <include segmentGroup="dend_12"/>
                <include segmentGroup="dend_50"/>
            </segmentGroup>

            <segmentGroup id="ModelViewParmSubset_45">
                <include segmentGroup="dend_84"/>
                <include segmentGroup="dend_86"/>
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            </segmentGroup>

            <segmentGroup id="ModelViewParmSubset_52">
                <include segmentGroup="dend_435"/>
                <include segmentGroup="dend_448"/>
            </segmentGroup>

            <segmentGroup id="OneSecGrp_SectionRef_173">
                <include segmentGroup="dend_1107"/>
            </segmentGroup>

            <segmentGroup id="ModelViewParmSubset_30">
                <include segmentGroup="dend_531"/>
                <include segmentGroup="dend_220"/>
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            </segmentGroup>

            <segmentGroup id="ModelViewParmSubset_5">
                <include segmentGroup="dend_534"/>
                <include segmentGroup="dend_536"/>
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            </segmentGroup>

            <segmentGroup id="ModelViewParmSubset_64">
                <include segmentGroup="dend_13"/>
                <include segmentGroup="dend_14"/>
                <include segmentGroup="dend_1261"/>
            </segmentGroup>

            <segmentGroup id="ModelViewParmSubset_53">
                <include segmentGroup="dend_436"/>
                <include segmentGroup="dend_550"/>
                <include segmentGroup="dend_1143"/>
            </segmentGroup>

            <segmentGroup id="ModelViewParmSubset_26">
                <include segmentGroup="dend_1072"/>
                <include segmentGroup="dend_251"/>
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            </segmentGroup>

            <segmentGroup id="ModelViewParmSubset_13">
                <include segmentGroup="dend_1108"/>
                <include segmentGroup="dend_1485"/>
                <include segmentGroup="dend_1501"/>
                <include segmentGroup="dend_1540"/>
            </segmentGroup>

            <segmentGroup id="ModelViewParmSubset_9">
                <include segmentGroup="dend_655"/>
                <include segmentGroup="dend_1269"/>
                <include segmentGroup="dend_954"/>
            </segmentGroup>

            <segmentGroup id="ModelViewParmSubset_61">
                <include segmentGroup="dend_535"/>
                <include segmentGroup="dend_15"/>
                <include segmentGroup="dend_43"/>
                <include segmentGroup="dend_884"/>
            </segmentGroup>

            <segmentGroup id="ModelViewParmSubset_8">
                <include segmentGroup="dend_716"/>
                <include segmentGroup="dend_1001"/>
                <include segmentGroup="dend_1554"/>
            </segmentGroup>

            <segmentGroup id="ModelViewParmSubset_44">
                <include segmentGroup="dend_87"/>
                <include segmentGroup="dend_486"/>
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            </segmentGroup>

            <segmentGroup id="ModelViewParmSubset_6">
                <include segmentGroup="dend_542"/>
                <include segmentGroup="dend_757"/>
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            </segmentGroup>

            <segmentGroup id="ModelViewParmSubset_48">
                <include segmentGroup="dend_1106"/>
                <include segmentGroup="dend_1104"/>
                <include segmentGroup="dend_1105"/>
            </segmentGroup>

            <segmentGroup id="ModelViewParmSubset_7">
                <include segmentGroup="dend_723"/>
                <include segmentGroup="dend_544"/>
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            </segmentGroup>

            <segmentGroup id="ModelViewParmSubset_73">
                <include segmentGroup="dend_16"/>
                <include segmentGroup="dend_21"/>
            </segmentGroup>

            <segmentGroup id="ModelViewParmSubset_50">
                <include segmentGroup="dend_53"/>
                <include segmentGroup="dend_1334"/>
                <include segmentGroup="dend_1354"/>
            </segmentGroup>

            <segmentGroup id="ModelViewParmSubset_76">
                <include segmentGroup="dend_38"/>
                <include segmentGroup="dend_1142"/>
                <include segmentGroup="dend_18"/>
            </segmentGroup>

            <segmentGroup id="ModelViewParmSubset_14">
                <include segmentGroup="dend_662"/>
                <include segmentGroup="dend_671"/>
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            </segmentGroup>

            <segmentGroup id="ModelViewParmSubset_11">
                <include segmentGroup="dend_724"/>
                <include segmentGroup="dend_759"/>
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            </segmentGroup>

            <segmentGroup id="ModelViewParmSubset_75">
                <include segmentGroup="dend_747"/>
                <include segmentGroup="dend_67"/>
            </segmentGroup>

            <segmentGroup id="ModelViewParmSubset_82">
                <include segmentGroup="dend_17"/>
                <include segmentGroup="dend_68"/>
            </segmentGroup>

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
            <segmentGroup id="ModelViewParmSubset_10">
                <include segmentGroup="dend_551"/>
                <include segmentGroup="dend_1464"/>
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            </segmentGroup>

            <segmentGroup id="ModelViewParmSubset_55">
                <include segmentGroup="dend_810"/>
                <include segmentGroup="dend_1403"/>
                <include segmentGroup="dend_25"/>
            </segmentGroup>

            <segmentGroup id="ModelViewParmSubset_66">
                <include segmentGroup="dend_19"/>
                <include segmentGroup="dend_45"/>
                <include segmentGroup="dend_61"/>
                <include segmentGroup="dend_47"/>
            </segmentGroup>

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
        </morphology>

            <!--Adding the biophysical parameters-->

        <biophysicalProperties id="biophys">

            <membraneProperties>

                <channelDensity condDensity="0.100779 mS_per_cm2" id="Leak_ModelViewParmSubset_12" ionChannel="Leak" segmentGroup="ModelViewParmSubset_12" erev="-80.0 mV" ion="non_specific"/>

                <channelDensity condDensity="0.102042 mS_per_cm2" id="Leak_ModelViewParmSubset_13" ionChannel="Leak" segmentGroup="ModelViewParmSubset_13" erev="-80.0 mV" ion="non_specific"/>

                <channelDensity condDensity="0.103622 mS_per_cm2" id="Leak_ModelViewParmSubset_14" ionChannel="Leak" segmentGroup="ModelViewParmSubset_14" erev="-80.0 mV" ion="non_specific"/>

                <channelDensity condDensity="0.104995 mS_per_cm2" id="Leak_ModelViewParmSubset_15" ionChannel="Leak" segmentGroup="ModelViewParmSubset_15" erev="-80.0 mV" ion="non_specific"/>

                <channelDensity condDensity="0.106714 mS_per_cm2" id="Leak_ModelViewParmSubset_16" ionChannel="Leak" segmentGroup="ModelViewParmSubset_16" erev="-80.0 mV" ion="non_specific"/>

                <channelDensity condDensity="0.108519 mS_per_cm2" id="Leak_ModelViewParmSubset_17" ionChannel="Leak" segmentGroup="ModelViewParmSubset_17" erev="-80.0 mV" ion="non_specific"/>

                <channelDensity condDensity="0.1 mS_per_cm2" id="Leak_OneSecGrp_SectionRef_1" ionChannel="Leak" segmentGroup="OneSecGrp_SectionRef_1" erev="-80.0 mV" ion="non_specific"/>

                <channelDensity condDensity="0.110092 mS_per_cm2" id="Leak_ModelViewParmSubset_18" ionChannel="Leak" segmentGroup="ModelViewParmSubset_18" erev="-80.0 mV" ion="non_specific"/>

                <channelDensity condDensity="0.112068 mS_per_cm2" id="Leak_ModelViewParmSubset_19" ionChannel="Leak" segmentGroup="ModelViewParmSubset_19" erev="-80.0 mV" ion="non_specific"/>

                <channelDensity condDensity="0.113795 mS_per_cm2" id="Leak_ModelViewParmSubset_20" ionChannel="Leak" segmentGroup="ModelViewParmSubset_20" erev="-80.0 mV" ion="non_specific"/>

                <channelDensity condDensity="0.11597 mS_per_cm2" id="Leak_ModelViewParmSubset_21" ionChannel="Leak" segmentGroup="ModelViewParmSubset_21" erev="-80.0 mV" ion="non_specific"/>

                <channelDensity condDensity="0.117874 mS_per_cm2" id="Leak_ModelViewParmSubset_22" ionChannel="Leak" segmentGroup="ModelViewParmSubset_22" erev="-80.0 mV" ion="non_specific"/>

                <channelDensity condDensity="0.120278 mS_per_cm2" id="Leak_ModelViewParmSubset_23" ionChannel="Leak" segmentGroup="ModelViewParmSubset_23" erev="-80.0 mV" ion="non_specific"/>

                <channelDensity condDensity="0.122388 mS_per_cm2" id="Leak_ModelViewParmSubset_24" ionChannel="Leak" segmentGroup="ModelViewParmSubset_24" erev="-80.0 mV" ion="non_specific"/>

                <channelDensity condDensity="0.12506 mS_per_cm2" id="Leak_ModelViewParmSubset_25" ionChannel="Leak" segmentGroup="ModelViewParmSubset_25" erev="-80.0 mV" ion="non_specific"/>

                <channelDensity condDensity="0.127897 mS_per_cm2" id="Leak_ModelViewParmSubset_26" ionChannel="Leak" segmentGroup="ModelViewParmSubset_26" erev="-80.0 mV" ion="non_specific"/>

                <channelDensity condDensity="0.130398 mS_per_cm2" id="Leak_ModelViewParmSubset_27" ionChannel="Leak" segmentGroup="ModelViewParmSubset_27" erev="-80.0 mV" ion="non_specific"/>

                <channelDensity condDensity="0.133581 mS_per_cm2" id="Leak_ModelViewParmSubset_28" ionChannel="Leak" segmentGroup="ModelViewParmSubset_28" erev="-80.0 mV" ion="non_specific"/>

                <channelDensity condDensity="0.136397 mS_per_cm2" id="Leak_ModelViewParmSubset_29" ionChannel="Leak" segmentGroup="ModelViewParmSubset_29" erev="-80.0 mV" ion="non_specific"/>

                <channelDensity condDensity="0.139992 mS_per_cm2" id="Leak_ModelViewParmSubset_30" ionChannel="Leak" segmentGroup="ModelViewParmSubset_30" erev="-80.0 mV" ion="non_specific"/>

                <channelDensity condDensity="0.143185 mS_per_cm2" id="Leak_ModelViewParmSubset_31" ionChannel="Leak" segmentGroup="ModelViewParmSubset_31" erev="-80.0 mV" ion="non_specific"/>

                <channelDensity condDensity="0.147279 mS_per_cm2" id="Leak_ModelViewParmSubset_32" ionChannel="Leak" segmentGroup="ModelViewParmSubset_32" erev="-80.0 mV" ion="non_specific"/>

                <channelDensity condDensity="0.150931 mS_per_cm2" id="Leak_ModelViewParmSubset_33" ionChannel="Leak" segmentGroup="ModelViewParmSubset_33" erev="-80.0 mV" ion="non_specific"/>

                <channelDensity condDensity="0.155635 mS_per_cm2" id="Leak_ModelViewParmSubset_34" ionChannel="Leak" segmentGroup="ModelViewParmSubset_34" erev="-80.0 mV" ion="non_specific"/>

                <channelDensity condDensity="0.160731 mS_per_cm2" id="Leak_ModelViewParmSubset_35" ionChannel="Leak" segmentGroup="ModelViewParmSubset_35" erev="-80.0 mV" ion="non_specific"/>

                <channelDensity condDensity="0.165314 mS_per_cm2" id="Leak_ModelViewParmSubset_36" ionChannel="Leak" segmentGroup="ModelViewParmSubset_36" erev="-80.0 mV" ion="non_specific"/>

                <channelDensity condDensity="0.171268 mS_per_cm2" id="Leak_ModelViewParmSubset_37" ionChannel="Leak" segmentGroup="ModelViewParmSubset_37" erev="-80.0 mV" ion="non_specific"/>

                <channelDensity condDensity="0.174451 mS_per_cm2" id="Leak_OneSecGrp_SectionRef_98" ionChannel="Leak" segmentGroup="OneSecGrp_SectionRef_98" erev="-80.0 mV" ion="non_specific"/>

                <channelDensity condDensity="0.176656 mS_per_cm2" id="Leak_ModelViewParmSubset_38" ionChannel="Leak" segmentGroup="ModelViewParmSubset_38" erev="-80.0 mV" ion="non_specific"/>

                <channelDensity condDensity="0.183704 mS_per_cm2" id="Leak_ModelViewParmSubset_39" ionChannel="Leak" segmentGroup="ModelViewParmSubset_39" erev="-80.0 mV" ion="non_specific"/>

                <channelDensity condDensity="0.19013 mS_per_cm2" id="Leak_ModelViewParmSubset_40" ionChannel="Leak" segmentGroup="ModelViewParmSubset_40" erev="-80.0 mV" ion="non_specific"/>

                <channelDensity condDensity="0.198606 mS_per_cm2" id="Leak_ModelViewParmSubset_41" ionChannel="Leak" segmentGroup="ModelViewParmSubset_41" erev="-80.0 mV" ion="non_specific"/>

                <channelDensity condDensity="0.206402 mS_per_cm2" id="Leak_ModelViewParmSubset_42" ionChannel="Leak" segmentGroup="ModelViewParmSubset_42" erev="-80.0 mV" ion="non_specific"/>

                <channelDensity condDensity="0.216786 mS_per_cm2" id="Leak_ModelViewParmSubset_43" ionChannel="Leak" segmentGroup="ModelViewParmSubset_43" erev="-80.0 mV" ion="non_specific"/>

                <channelDensity condDensity="0.228496 mS_per_cm2" id="Leak_ModelViewParmSubset_44" ionChannel="Leak" segmentGroup="ModelViewParmSubset_44" erev="-80.0 mV" ion="non_specific"/>

                <channelDensity condDensity="0.23946 mS_per_cm2" id="Leak_ModelViewParmSubset_45" ionChannel="Leak" segmentGroup="ModelViewParmSubset_45" erev="-80.0 mV" ion="non_specific"/>

                <channelDensity condDensity="0.254361 mS_per_cm2" id="Leak_ModelViewParmSubset_46" ionChannel="Leak" segmentGroup="ModelViewParmSubset_46" erev="-80.0 mV" ion="non_specific"/>

                <channelDensity condDensity="0.268529 mS_per_cm2" id="Leak_ModelViewParmSubset_47" ionChannel="Leak" segmentGroup="ModelViewParmSubset_47" erev="-80.0 mV" ion="non_specific"/>

                <channelDensity condDensity="0.307143 mS_per_cm2" id="Leak_ModelViewParmSubset_48" ionChannel="Leak" segmentGroup="ModelViewParmSubset_48" erev="-80.0 mV" ion="non_specific"/>

                <channelDensity condDensity="0.0333333 mS_per_cm2" id="Leak_ModelViewParmSubset_87" ionChannel="Leak" segmentGroup="ModelViewParmSubset_87" erev="-80.0 mV" ion="non_specific"/>

                <channelDensity condDensity="0.0923213 mS_per_cm2" id="Leak_ModelViewParmSubset_5" ionChannel="Leak" segmentGroup="ModelViewParmSubset_5" erev="-80.0 mV" ion="non_specific"/>

                <channelDensity condDensity="0.0932852 mS_per_cm2" id="Leak_ModelViewParmSubset_6" ionChannel="Leak" segmentGroup="ModelViewParmSubset_6" erev="-80.0 mV" ion="non_specific"/>

                <channelDensity condDensity="0.0944842 mS_per_cm2" id="Leak_ModelViewParmSubset_7" ionChannel="Leak" segmentGroup="ModelViewParmSubset_7" erev="-80.0 mV" ion="non_specific"/>

                <channelDensity condDensity="0.0957322 mS_per_cm2" id="Leak_ModelViewParmSubset_8" ionChannel="Leak" segmentGroup="ModelViewParmSubset_8" erev="-80.0 mV" ion="non_specific"/>

                <channelDensity condDensity="0.0968117 mS_per_cm2" id="Leak_ModelViewParmSubset_9" ionChannel="Leak" segmentGroup="ModelViewParmSubset_9" erev="-80.0 mV" ion="non_specific"/>

                <channelDensity condDensity="0.0981576 mS_per_cm2" id="Leak_ModelViewParmSubset_10" ionChannel="Leak" segmentGroup="ModelViewParmSubset_10" erev="-80.0 mV" ion="non_specific"/>

                <channelDensity condDensity="0.0993235 mS_per_cm2" id="Leak_ModelViewParmSubset_11" ionChannel="Leak" segmentGroup="ModelViewParmSubset_11" erev="-80.0 mV" ion="non_specific"/>

                <spikeThresh value="0.0 mV"/>

                <specificCapacitance segmentGroup="ModelViewParmSubset_42" value="10.155 uF_per_cm2"/>

                <specificCapacitance segmentGroup="ModelViewParmSubset_43" value="10.6659 uF_per_cm2"/>

                <specificCapacitance segmentGroup="ModelViewParmSubset_44" value="11.242 uF_per_cm2"/>

                <specificCapacitance segmentGroup="ModelViewParmSubset_45" value="11.7814 uF_per_cm2"/>

                <specificCapacitance segmentGroup="ModelViewParmSubset_46" value="12.5145 uF_per_cm2"/>

                <specificCapacitance segmentGroup="ModelViewParmSubset_47" value="13.2116 uF_per_cm2"/>

                <specificCapacitance segmentGroup="ModelViewParmSubset_48" value="15.1114 uF_per_cm2"/>

                <specificCapacitance segmentGroup="ModelViewParmSubset_4" value="1.64 uF_per_cm2"/>

                <specificCapacitance segmentGroup="ModelViewParmSubset_5" value="4.54221 uF_per_cm2"/>

                <specificCapacitance segmentGroup="ModelViewParmSubset_6" value="4.58963 uF_per_cm2"/>

                <specificCapacitance segmentGroup="ModelViewParmSubset_7" value="4.64862 uF_per_cm2"/>

                <specificCapacitance segmentGroup="ModelViewParmSubset_8" value="4.71002 uF_per_cm2"/>

                <specificCapacitance segmentGroup="ModelViewParmSubset_9" value="4.76314 uF_per_cm2"/>

                <specificCapacitance segmentGroup="ModelViewParmSubset_10" value="4.82935 uF_per_cm2"/>

                <specificCapacitance segmentGroup="ModelViewParmSubset_11" value="4.88672 uF_per_cm2"/>

                <specificCapacitance segmentGroup="ModelViewParmSubset_12" value="4.95833 uF_per_cm2"/>

                <specificCapacitance segmentGroup="ModelViewParmSubset_13" value="5.02047 uF_per_cm2"/>

                <specificCapacitance segmentGroup="ModelViewParmSubset_14" value="5.09819 uF_per_cm2"/>

                <specificCapacitance segmentGroup="ModelViewParmSubset_15" value="5.16573 uF_per_cm2"/>

                <specificCapacitance segmentGroup="ModelViewParmSubset_16" value="5.25035 uF_per_cm2"/>

                <specificCapacitance segmentGroup="ModelViewParmSubset_17" value="5.33913 uF_per_cm2"/>

                <specificCapacitance segmentGroup="ModelViewParmSubset_18" value="5.41651 uF_per_cm2"/>

                <specificCapacitance segmentGroup="ModelViewParmSubset_19" value="5.51376 uF_per_cm2"/>

                <specificCapacitance segmentGroup="ModelViewParmSubset_20" value="5.59871 uF_per_cm2"/>

                <specificCapacitance segmentGroup="ModelViewParmSubset_21" value="5.70571 uF_per_cm2"/>

                <specificCapacitance segmentGroup="ModelViewParmSubset_22" value="5.79939 uF_per_cm2"/>

                <specificCapacitance segmentGroup="ModelViewParmSubset_23" value="5.91766 uF_per_cm2"/>

                <specificCapacitance segmentGroup="ModelViewParmSubset_24" value="6.02149 uF_per_cm2"/>

                <specificCapacitance segmentGroup="ModelViewParmSubset_25" value="6.15293 uF_per_cm2"/>

                <specificCapacitance segmentGroup="ModelViewParmSubset_26" value="6.29251 uF_per_cm2"/>

                <specificCapacitance segmentGroup="ModelViewParmSubset_27" value="6.41559 uF_per_cm2"/>

                <specificCapacitance segmentGroup="ModelViewParmSubset_28" value="6.57217 uF_per_cm2"/>

                <specificCapacitance segmentGroup="ModelViewParmSubset_29" value="6.71071 uF_per_cm2"/>

                <specificCapacitance segmentGroup="ModelViewParmSubset_30" value="6.8876 uF_per_cm2"/>

                <specificCapacitance segmentGroup="ModelViewParmSubset_31" value="7.04471 uF_per_cm2"/>

                <specificCapacitance segmentGroup="ModelViewParmSubset_32" value="7.24613 uF_per_cm2"/>

                <specificCapacitance segmentGroup="ModelViewParmSubset_33" value="7.42581 uF_per_cm2"/>

                <specificCapacitance segmentGroup="ModelViewParmSubset_34" value="7.65725 uF_per_cm2"/>

                <specificCapacitance segmentGroup="ModelViewParmSubset_35" value="7.90796 uF_per_cm2"/>

                <specificCapacitance segmentGroup="ModelViewParmSubset_36" value="8.13343 uF_per_cm2"/>

                <specificCapacitance segmentGroup="ModelViewParmSubset_37" value="8.42637 uF_per_cm2"/>

                <specificCapacitance segmentGroup="OneSecGrp_SectionRef_98" value="8.58298 uF_per_cm2"/>

                <specificCapacitance segmentGroup="ModelViewParmSubset_38" value="8.69146 uF_per_cm2"/>

                <specificCapacitance segmentGroup="ModelViewParmSubset_39" value="9.03825 uF_per_cm2"/>

                <specificCapacitance segmentGroup="ModelViewParmSubset_40" value="9.35442 uF_per_cm2"/>

                <specificCapacitance segmentGroup="ModelViewParmSubset_41" value="9.77141 uF_per_cm2"/>

                <initMembPotential value="-65.0 mV"/>

            </membraneProperties>

            <intracellularProperties>

                <resistivity value="0.25 kohm_cm"/>

            </intracellularProperties>

        </biophysicalProperties>

    </cell>

</neuroml>
