<?xml version="1.0" encoding="UTF-8"?>

<neuroml xmlns=  "http://www.neuroml.org/schema/neuroml2" xmlns:xsi=  "http://www.w3.org/2001/XMLSchema-instance" xsi:schemaLocation = "http://www.neuroml.org/schema/neuroml2  https://raw.github.com/NeuroML/NeuroML2/master/Schemas/NeuroML2/NeuroML_v2beta.xsd" id = "L23PyrRS">

    <include href = "ar.nml"/>

    <include href = "cad.nml"/>

    <include href = "cal.nml"/>

    <include href = "cat.nml"/>

    <include href = "k2.nml"/>

    <include href = "ka.nml"/>

    <include href = "kahp.nml"/>

    <include href = "kc.nml"/>

    <include href = "kdr.nml"/>

    <include href = "km.nml"/>

    <include href = "naf.nml"/>

    <include href = "nap.nml"/>

    <include href = "pas.nml"/>

    <cell id = "L23PyrRS">

        <notes>Cell: suppyrRS_0 exported from NEURON ModelView</notes>

        <morphology id = "morphology_L23PyrRS">

            <segment id = "0" name = "Seg0_comp_1">
                <proximal x = "0.0" y = "0.0" z = "0.0" diameter = "16.0"/>
                <distal x = "0.0" y = "7.5" z = "0.0" diameter = "16.0"/>
            </segment>

            <segment id = "1" name = "Seg1_comp_1">
                <parent segment = "0"/>
                <distal x = "-0.0" y = "15.0" z = "0.0" diameter = "16.0"/>
            </segment>

            <segment id = "136" name = "Seg0_comp_69">
                <parent segment = "0" fractionAlong = "0.0"/>
                <proximal x = "0.0" y = "0.0" z = "0.0" diameter = "1.8"/>
                <distal x = "-0.0" y = "-12.5" z = "0.0" diameter = "1.8"/>
            </segment>

            <segment id = "137" name = "Seg1_comp_69">
                <parent segment = "136"/>
                <distal x = "-0.0" y = "-25.0" z = "0.0" diameter = "1.8"/>
            </segment>

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
            <segmentGroup id = "comp_1">
                <member segment = "0"/>

                <member segment = "1"/>
            </segmentGroup>

            <segmentGroup id = "comp_69">
                <member segment = "136"/>

                <member segment = "137"/>
            </segmentGroup>

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
            <segmentGroup id = "ModelViewParmSubset_1">
                <include segmentGroup = "comp_1"/>
                <include segmentGroup = "comp_38"/>
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            </segmentGroup>

            <segmentGroup id = "ModelViewParmSubset_3">
                <include segmentGroup = "comp_1"/>
                <include segmentGroup = "comp_69"/>
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            </segmentGroup>

            <segmentGroup id = "ModelViewParmSubset_8">
                <include segmentGroup = "comp_1"/>
                <include segmentGroup = "comp_9"/>
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            </segmentGroup>

            <segmentGroup id = "OneSecGrp_SectionRef_1">
                <include segmentGroup = "comp_1"/>
            </segmentGroup>

            <segmentGroup id = "soma_group">
                <include segmentGroup = "comp_1"/>
            </segmentGroup>

            <segmentGroup id = "prox_dends_soma">
                <include segmentGroup = "comp_1"/>
                <include segmentGroup = "comp_38"/>
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            </segmentGroup>

            <segmentGroup id = "ModelViewParmSubset_2">
                <include segmentGroup = "comp_69"/>
                <include segmentGroup = "comp_70"/>
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            </segmentGroup>

            <segmentGroup id = "axon_group">
                <include segmentGroup = "comp_69"/>
                <include segmentGroup = "comp_70"/>
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            </segmentGroup>

            <segmentGroup id = "prox_axon">
                <include segmentGroup = "comp_69"/>
            </segmentGroup>

            <segmentGroup id = "dendrite_group">
                <include segmentGroup = "comp_38"/>
                <include segmentGroup = "comp_9"/>
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            </segmentGroup>

            <segmentGroup id = "ModelViewParmSubset_4">
                <include segmentGroup = "comp_38"/>
                <include segmentGroup = "comp_9"/>
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            </segmentGroup>

            <segmentGroup id = "OneSecGrp_SectionRef_3">
                <include segmentGroup = "comp_38"/>
            </segmentGroup>

            <segmentGroup id = "ModelViewParmSubset_5">
                <include segmentGroup = "comp_9"/>
                <include segmentGroup = "comp_8"/>
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            </segmentGroup>

            <segmentGroup id = "ModelViewParmSubset_7">
                <include segmentGroup = "comp_9"/>
                <include segmentGroup = "comp_8"/>
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            </segmentGroup>

            <segmentGroup id = "most_prox_bas_dend">
                <include segmentGroup = "comp_9"/>
                <include segmentGroup = "comp_8"/>
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            </segmentGroup>

            <segmentGroup id = "basal_obl_dends">
                <include segmentGroup = "comp_9"/>
                <include segmentGroup = "comp_8"/>
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            </segmentGroup>

            <segmentGroup id = "basal_dends">
                <include segmentGroup = "comp_9"/>
                <include segmentGroup = "comp_8"/>
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            </segmentGroup>

            <segmentGroup id = "mid_dist_apic_dend">
                <include segmentGroup = "comp_39"/>
                <include segmentGroup = "comp_13"/>
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            </segmentGroup>

            <segmentGroup id = "ModelViewParmSubset_6">
                <include segmentGroup = "comp_21"/>
                <include segmentGroup = "comp_20"/>
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            </segmentGroup>

            <segmentGroup id = "mid_dist_bas_dend">
                <include segmentGroup = "comp_21"/>
                <include segmentGroup = "comp_20"/>
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            </segmentGroup>

            <segmentGroup id = "LTS_dends">
                <include segmentGroup = "comp_21"/>
                <include segmentGroup = "comp_20"/>
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            </segmentGroup>

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
        </morphology>

            <!-- Adding the biophysical parameters -->
        <biophysicalProperties id = "biophys">

            <membraneProperties>

                <channelDensity condDensity = "0.25 mS_per_cm2" id = "ar_OneSecGrp_SectionRef_1" ionChannel = "ar" segmentGroup = "OneSecGrp_SectionRef_1" ion = "ar" erev = "-35.0 mV"/>

                <channelDensity condDensity = "-1.0E8 mS_per_cm2" id = "ar_ModelViewParmSubset_1" ionChannel = "ar" segmentGroup = "ModelViewParmSubset_1" erev = "-35.0 mV" m0 = "0.25" ion = "ar">    <!-- Note: Units of extra parameters are not known, except if it's e or erev!! -->    <!-- Note: Units of extra parameters are not known, except if it's e or erev!! --></channelDensity>

                <channelDensity condDensity = "0.5 mS_per_cm2" id = "ar_ModelViewParmSubset_4" ionChannel = "ar" segmentGroup = "ModelViewParmSubset_4" ion = "ar" erev = "-35.0 mV"/>

                <channelDensity condDensity = "2.0 mS_per_cm2" id = "cal_ModelViewParmSubset_4" ionChannel = "cal" segmentGroup = "ModelViewParmSubset_4" ion = "ca" erev = "125.0 mV"/>

                <channelDensity condDensity = "1.0 mS_per_cm2" id = "cal_OneSecGrp_SectionRef_1" ionChannel = "cal" segmentGroup = "OneSecGrp_SectionRef_1" ion = "ca" erev = "125.0 mV"/>

                <channelDensity condDensity = "0.2 mS_per_cm2" id = "cat_ModelViewParmSubset_4" ionChannel = "cat" segmentGroup = "ModelViewParmSubset_4" ion = "cat" erev = "125.0 mV"/>

                <channelDensity condDensity = "0.1 mS_per_cm2" id = "cat_OneSecGrp_SectionRef_1" ionChannel = "cat" segmentGroup = "OneSecGrp_SectionRef_1" ion = "cat" erev = "125.0 mV"/>

                <channelDensity condDensity = "0.2 mS_per_cm2" id = "k2_ModelViewParmSubset_4" ionChannel = "k2" segmentGroup = "ModelViewParmSubset_4" ion = "k" erev = "-95.0 mV"/>

                <channelDensity condDensity = "0.1 mS_per_cm2" id = "k2_ModelViewParmSubset_3" ionChannel = "k2" segmentGroup = "ModelViewParmSubset_3" ion = "k" erev = "-95.0 mV"/>

                <channelDensity condDensity = "60.0 mS_per_cm2" id = "ka_OneSecGrp_SectionRef_3" ionChannel = "ka" segmentGroup = "OneSecGrp_SectionRef_3" ion = "k" erev = "-95.0 mV"/>

                <channelDensity condDensity = "4.0 mS_per_cm2" id = "ka_ModelViewParmSubset_5" ionChannel = "ka" segmentGroup = "ModelViewParmSubset_5" ion = "k" erev = "-95.0 mV"/>

                <channelDensity condDensity = "30.0 mS_per_cm2" id = "ka_OneSecGrp_SectionRef_1" ionChannel = "ka" segmentGroup = "OneSecGrp_SectionRef_1" ion = "k" erev = "-95.0 mV"/>

                <channelDensity condDensity = "2.0 mS_per_cm2" id = "ka_ModelViewParmSubset_2" ionChannel = "ka" segmentGroup = "ModelViewParmSubset_2" ion = "k" erev = "-95.0 mV"/>

                <channelDensity condDensity = "0.08 mS_per_cm2" id = "kahp_ModelViewParmSubset_4" ionChannel = "kahp" segmentGroup = "ModelViewParmSubset_4" ion = "k" erev = "-95.0 mV"/>

                <channelDensity condDensity = "0.04 mS_per_cm2" id = "kahp_OneSecGrp_SectionRef_1" ionChannel = "kahp" segmentGroup = "OneSecGrp_SectionRef_1" ion = "k" erev = "-95.0 mV"/>

                <channelDensity condDensity = "12.0 mS_per_cm2" id = "kc_OneSecGrp_SectionRef_1" ionChannel = "kc" segmentGroup = "OneSecGrp_SectionRef_1" ion = "k" erev = "-95.0 mV"/>

                <channelDensity condDensity = "24.0 mS_per_cm2" id = "kc_ModelViewParmSubset_4" ionChannel = "kc" segmentGroup = "ModelViewParmSubset_4" ion = "k" erev = "-95.0 mV"/>

                <channelDensity condDensity = "125.0 mS_per_cm2" id = "kdr_OneSecGrp_SectionRef_1" ionChannel = "kdr" segmentGroup = "OneSecGrp_SectionRef_1" ion = "k" erev = "-95.0 mV"/>

                <channelDensity condDensity = "250.0 mS_per_cm2" id = "kdr_OneSecGrp_SectionRef_3" ionChannel = "kdr" segmentGroup = "OneSecGrp_SectionRef_3" ion = "k" erev = "-95.0 mV"/>

                <channelDensity condDensity = "12.5 mS_per_cm2" id = "kdr_ModelViewParmSubset_6" ionChannel = "kdr" segmentGroup = "ModelViewParmSubset_6" ion = "k" erev = "-95.0 mV"/>

                <channelDensity condDensity = "187.5 mS_per_cm2" id = "kdr_ModelViewParmSubset_7" ionChannel = "kdr" segmentGroup = "ModelViewParmSubset_7" ion = "k" erev = "-95.0 mV"/>

                <channelDensity condDensity = "400.0 mS_per_cm2" id = "kdr_ModelViewParmSubset_2" ionChannel = "kdr" segmentGroup = "ModelViewParmSubset_2" ion = "k" erev = "-95.0 mV"/>

                <channelDensity condDensity = "15.0 mS_per_cm2" id = "km_ModelViewParmSubset_4" ionChannel = "km" segmentGroup = "ModelViewParmSubset_4" ion = "k" erev = "-95.0 mV"/>

                <channelDensity condDensity = "7.5 mS_per_cm2" id = "km_OneSecGrp_SectionRef_1" ionChannel = "km" segmentGroup = "OneSecGrp_SectionRef_1" ion = "k" erev = "-95.0 mV"/>

                <channelDensity condDensity = "250.0 mS_per_cm2" id = "naf_OneSecGrp_SectionRef_3" ionChannel = "naf" segmentGroup = "OneSecGrp_SectionRef_3" ion = "na" erev = "50.0 mV"/>

                <channelDensity condDensity = "187.5 mS_per_cm2" id = "naf_ModelViewParmSubset_8" ionChannel = "naf" segmentGroup = "ModelViewParmSubset_8" ion = "na" erev = "50.0 mV"/>

                <channelDensity condDensity = "25.0 mS_per_cm2" id = "naf_ModelViewParmSubset_6" ionChannel = "naf" segmentGroup = "ModelViewParmSubset_6" ion = "na" erev = "50.0 mV"/>

                <channelDensity condDensity = "-1.0E8 mS_per_cm2" id = "naf_all" ionChannel = "naf" a = "0.0" b = "0.0" c = "0.0" d = "0.0" fastNa_shift = "-3.5" ion = "na" erev = "50.0 mV">    <!-- Note: Units of extra parameters are not known, except if it's e or erev!! -->    <!-- Note: Units of extra parameters are not known, except if it's e or erev!! -->    <!-- Note: Units of extra parameters are not known, except if it's e or erev!! -->    <!-- Note: Units of extra parameters are not known, except if it's e or erev!! -->    <!-- Note: Units of extra parameters are not known, except if it's e or erev!! --></channelDensity>

                <channelDensity condDensity = "400.0 mS_per_cm2" id = "naf_ModelViewParmSubset_2" ionChannel = "naf" segmentGroup = "ModelViewParmSubset_2" ion = "na" erev = "50.0 mV"/>

                <channelDensity condDensity = "0.016 mS_per_cm2" id = "nap_ModelViewParmSubset_6" ionChannel = "nap" segmentGroup = "ModelViewParmSubset_6" ion = "na" erev = "50.0 mV"/>

                <channelDensity condDensity = "0.12 mS_per_cm2" id = "nap_ModelViewParmSubset_8" ionChannel = "nap" segmentGroup = "ModelViewParmSubset_8" ion = "na" erev = "50.0 mV"/>

                <channelDensity condDensity = "0.16 mS_per_cm2" id = "nap_OneSecGrp_SectionRef_3" ionChannel = "nap" segmentGroup = "OneSecGrp_SectionRef_3" ion = "na" erev = "50.0 mV"/>

                <channelDensity condDensity = "0.04 mS_per_cm2" id = "pas_ModelViewParmSubset_4" ionChannel = "pas" segmentGroup = "ModelViewParmSubset_4" ion = "non_specific" erev = "-66.6 mV"/>

                <channelDensity condDensity = "-1.0E8 mS_per_cm2" id = "pas_all" ionChannel = "pas" erev = "-70.0 mV" ion = "non_specific">    <!-- Note: Units of extra parameters are not known, except if it's e or erev!! --></channelDensity>

                <channelDensity condDensity = "0.02 mS_per_cm2" id = "pas_OneSecGrp_SectionRef_1" ionChannel = "pas" segmentGroup = "OneSecGrp_SectionRef_1" ion = "non_specific" erev = "-66.6 mV"/>

                <channelDensity condDensity = "1.0 mS_per_cm2" id = "pas_ModelViewParmSubset_2" ionChannel = "pas" segmentGroup = "ModelViewParmSubset_2" ion = "non_specific" erev = "-66.6 mV"/>

                <spikeThresh value = "0 mV"/>

                <specificCapacitance segmentGroup = "ModelViewParmSubset_3" value = "0.9 uF_per_cm2"/>

                <specificCapacitance segmentGroup = "ModelViewParmSubset_4" value = "1.8 uF_per_cm2"/>

                <initMembPotential value = "-70.0 mV"/>

            </membraneProperties>

            <intracellularProperties>

                <species segmentGroup = "ModelViewParmSubset_4" beta = "0.05" phi = "52000.0" id = "ca" ion = "ca" concentrationModel = "cad">    <!-- Note: Units of extra parameters are not known, except if it's e or erev!! -->    <!-- Note: Units of extra parameters are not known, except if it's e or erev!! --></species>

                <species segmentGroup = "OneSecGrp_SectionRef_1" beta = "0.01" phi = "26000.0" id = "ca" ion = "ca" concentrationModel = "cad">    <!-- Note: Units of extra parameters are not known, except if it's e or erev!! -->    <!-- Note: Units of extra parameters are not known, except if it's e or erev!! --></species>

                <resistivity segmentGroup = "ModelViewParmSubset_2" value = "0.1 kohm_cm"/>

                <resistivity segmentGroup = "ModelViewParmSubset_1" value = "0.25 kohm_cm"/>

            </intracellularProperties>

        </biophysicalProperties>

    </cell>

</neuroml>
