<neuroml xmlns="http://www.neuroml.org/schema/neuroml2"  xmlns:xs="http://www.w3.org/2001/XMLSchema" xmlns:xsi="http://www.w3.org/2001/XMLSchema-instance" xsi:schemaLocation="http://www.neuroml.org/schema/neuroml2 https://raw.github.com/NeuroML/NeuroML2/development/Schemas/NeuroML2/NeuroML_v2beta4.xsd" id="NeuroML2_file_exported_from_NEURON">
    <include href="K_Tst.channel.nml"></include>
    <include href="SKv3_1.channel.nml"></include>
    <include href="StochKv_deterministic.channel.nml"></include>
    <include href="Nap_Et2.channel.nml"></include>
    <include href="NaTs2_t.channel.nml"></include>
    <include href="Ih.channel.nml"></include>
    <include href="pas.channel.nml"></include>
    <include href="Im.channel.nml"></include>
    <include href="NaTa_t.channel.nml"></include>
    <include href="Ca_LVAst.channel.nml"></include>
    <include href="SK_E2.channel.nml"></include>
    <include href="K_Pst.channel.nml"></include>
    <include href="CaDynamics_E2_NML2.nml"></include>
    <include href="Ca.channel.nml"></include>
    <cell id="bIR215_L5_DBC_50ea904e54_0_0">
        <notes>

Export of a cell model obtained from the BBP Neocortical Microcircuit Collaboration Portal into NeuroML2

******************************************************
*  This export to NeuroML2 has not yet been fully validated!!
*  Use with caution!!
******************************************************

For more information on this cell model see: https://bbp.epfl.ch/nmc-portal/microcircuit#/metype/L5_DBC_bIR/details

</notes>
        <morphology id="morphology">
            <segment id="0" name="Seg0_soma_0">
                <proximal y="-1.146700e+01" x="-6.050040e+00" z="1.685570e+00" diameter="4.950860e+00"/>
                <distal y="-1.029240e+01" x="-5.462900e+00" z="1.519300e+00" diameter="5.924990e+00"/>
            </segment>
            <segment id="2" name="Seg1_soma_0">
                <parent fractionAlong="1" segment="0"/>
                <distal y="-9.117750e+00" x="-4.875760e+00" z="1.353040e+00" diameter="7.141000e+00"/>
            </segment>
            <segment id="3" name="Seg2_soma_0">
                <parent fractionAlong="1" segment="2"/>
                <distal y="-7.943110e+00" x="-4.288630e+00" z="1.186770e+00" diameter="8.215640e+00"/>
            </segment>
            <segment id="4" name="Seg3_soma_0">
                <parent fractionAlong="1" segment="3"/>
                <distal y="-6.768480e+00" x="-3.701490e+00" z="1.020500e+00" diameter="9.251160e+00"/>
            </segment>
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            <segmentGroup neuroLexId="sao864921383" id="soma_0">
                <notes>This group contains an unbranched set of segments, and all of the segmentGroups marked with
             neuroLexId = sao864921383 form a non-overlapping set of all of the segments.
             These segmentGroups correspond to the 'cables' of NeuroML v1.8.1, and map to/from NEURON sections.</notes>
                <member segment="0"/>
                <member segment="2"/>
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            </segmentGroup>
            <segmentGroup neuroLexId="sao864921383" id="apic_0">
                <notes>This group contains an unbranched set of segments, and all of the segmentGroups marked with
             neuroLexId = sao864921383 form a non-overlapping set of all of the segments.
             These segmentGroups correspond to the 'cables' of NeuroML v1.8.1, and map to/from NEURON sections.</notes>
                <member segment="539"/>
                <member segment="540"/>
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            </segmentGroup>
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            <segmentGroup id="all">
                <include segmentGroup="soma_0"/>
                <include segmentGroup="apic_0"/>
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            </segmentGroup>
            <segmentGroup id="ModelViewParmSubset_1">
                <include segmentGroup="soma_0"/>
                <include segmentGroup="axon_0"/>
                <include segmentGroup="axon_1"/>
            </segmentGroup>
            <segmentGroup id="ModelViewParmSubset_2">
                <include segmentGroup="apic_0"/>
                <include segmentGroup="dend_23"/>
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            </segmentGroup>
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            <segmentGroup id="basal">
                <include segmentGroup="dend_0"/>
                <include segmentGroup="dend_1"/>
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                <inhomogeneousParameter id="PathLengthOver_basal" variable="p" metric="Path Length from root">
                    <proximal translationStart="0.000000e+00"/>
                </inhomogeneousParameter>
            </segmentGroup>
            <segmentGroup id="apical">
                <include segmentGroup="apic_0"/>
                <include segmentGroup="apic_1"/>
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                <inhomogeneousParameter id="PathLengthOver_apical" variable="p" metric="Path Length from root">
                    <proximal translationStart="0.000000e+00"/>
                </inhomogeneousParameter>
            </segmentGroup>
            <segmentGroup id="axonal">
                <include segmentGroup="axon_0"/>
                <include segmentGroup="axon_1"/>
            </segmentGroup>
            <segmentGroup id="somatic">
                <include segmentGroup="soma_0"/>
            </segmentGroup>
        </morphology>
        <biophysicalProperties id="biophys">
            <membraneProperties>
                <channelDensity id="basal_gSKv3_1bar_SKv3_1" segmentGroup="basal" ion="k" ionChannel="SKv3_1" erev="-85.0 mV" condDensity="0.00545 S_per_cm2"/>
                <channelDensity id="basal_gkbar_StochKv" segmentGroup="basal" ion="k" ionChannel="StochKv_deterministic" erev="-85.0 mV" condDensity="2.90744e-05 S_per_cm2"/>
                <channelDensity id="basal_gNap_Et2bar_Nap_Et2" segmentGroup="basal" ion="na" ionChannel="Nap_Et2" erev="50.0 mV" condDensity="1e-06 S_per_cm2"/>
                <channelDensity id="basal_gNaTs2_tbar_NaTs2_t" segmentGroup="basal" ion="na" ionChannel="NaTs2_t" erev="50.0 mV" condDensity="0.004119 S_per_cm2"/>
                <channelDensity id="basal_g_pas" segmentGroup="basal" ion="non_specific" ionChannel="pas" erev="-60.065872 mV" condDensity="6e-06 S_per_cm2"/>
                <channelDensity id="apical_gSKv3_1bar_SKv3_1" segmentGroup="apical" ion="k" ionChannel="SKv3_1" erev="-85.0 mV" condDensity="0.00545 S_per_cm2"/>
                <channelDensity id="apical_gkbar_StochKv" segmentGroup="apical" ion="k" ionChannel="StochKv_deterministic" erev="-85.0 mV" condDensity="2.90744e-05 S_per_cm2"/>
                <channelDensity id="apical_gNap_Et2bar_Nap_Et2" segmentGroup="apical" ion="na" ionChannel="Nap_Et2" erev="50.0 mV" condDensity="1e-06 S_per_cm2"/>
                <channelDensity id="apical_gNaTs2_tbar_NaTs2_t" segmentGroup="apical" ion="na" ionChannel="NaTs2_t" erev="50.0 mV" condDensity="0.004119 S_per_cm2"/>
                <channelDensity id="apical_g_pas" segmentGroup="apical" ion="non_specific" ionChannel="pas" erev="-60.065872 mV" condDensity="6e-06 S_per_cm2"/>
                <channelDensity id="axonal_gNaTa_tbar_NaTa_t" segmentGroup="axonal" ion="na" ionChannel="NaTa_t" erev="50.0 mV" condDensity="3.418459 S_per_cm2"/>
                <channelDensity id="axonal_gK_Tstbar_K_Tst" segmentGroup="axonal" ion="k" ionChannel="K_Tst" erev="-85.0 mV" condDensity="0.026009 S_per_cm2"/>
                <channelDensity id="axonal_gNap_Et2bar_Nap_Et2" segmentGroup="axonal" ion="na" ionChannel="Nap_Et2" erev="50.0 mV" condDensity="1e-06 S_per_cm2"/>
                <channelDensity id="axonal_gSK_E2bar_SK_E2" segmentGroup="axonal" ion="k" ionChannel="SK_E2" erev="-85.0 mV" condDensity="9e-06 S_per_cm2"/>
                <channelDensity id="axonal_gK_Pstbar_K_Pst" segmentGroup="axonal" ion="k" ionChannel="K_Pst" erev="-85.0 mV" condDensity="0.025854 S_per_cm2"/>
                <channelDensity id="axonal_gSKv3_1bar_SKv3_1" segmentGroup="axonal" ion="k" ionChannel="SKv3_1" erev="-85.0 mV" condDensity="0.196957 S_per_cm2"/>
                <channelDensity id="axonal_g_pas" segmentGroup="axonal" ion="non_specific" ionChannel="pas" erev="-60.250899 mV" condDensity="2e-06 S_per_cm2"/>
                <channelDensity id="axonal_gImbar_Im" segmentGroup="axonal" ion="k" ionChannel="Im" erev="-85.0 mV" condDensity="0.000599 S_per_cm2"/>
                <channelDensity id="somatic_gK_Tstbar_K_Tst" segmentGroup="somatic" ion="k" ionChannel="K_Tst" erev="-85.0 mV" condDensity="0.008343 S_per_cm2"/>
                <channelDensity id="somatic_gkbar_StochKv" segmentGroup="somatic" ion="k" ionChannel="StochKv_deterministic" erev="-85.0 mV" condDensity="6.58298e-05 S_per_cm2"/>
                <channelDensity id="somatic_gNap_Et2bar_Nap_Et2" segmentGroup="somatic" ion="na" ionChannel="Nap_Et2" erev="50.0 mV" condDensity="1e-06 S_per_cm2"/>
                <channelDensity id="somatic_gSK_E2bar_SK_E2" segmentGroup="somatic" ion="k" ionChannel="SK_E2" erev="-85.0 mV" condDensity="0.0269 S_per_cm2"/>
                <channelDensity id="somatic_gK_Pstbar_K_Pst" segmentGroup="somatic" ion="k" ionChannel="K_Pst" erev="-85.0 mV" condDensity="0.502333 S_per_cm2"/>
                <channelDensity id="somatic_gSKv3_1bar_SKv3_1" segmentGroup="somatic" ion="k" ionChannel="SKv3_1" erev="-85.0 mV" condDensity="0.653374 S_per_cm2"/>
                <channelDensity id="somatic_g_pas" segmentGroup="somatic" ion="non_specific" ionChannel="pas" erev="-76.498119 mV" condDensity="5.7e-05 S_per_cm2"/>
                <channelDensity id="somatic_gImbar_Im" segmentGroup="somatic" ion="k" ionChannel="Im" erev="-85.0 mV" condDensity="0.000784 S_per_cm2"/>
                <channelDensity id="somatic_gNaTs2_tbar_NaTs2_t" segmentGroup="somatic" ion="na" ionChannel="NaTs2_t" erev="50.0 mV" condDensity="0.300054 S_per_cm2"/>
                <channelDensityNernst id="axonal_gCa_LVAstbar_Ca_LVAst" ionChannel="Ca_LVAst" condDensity="0.002256 S_per_cm2" segmentGroup="axonal" ion="ca"/>
                <channelDensityNernst id="axonal_gCabar_Ca" ionChannel="Ca" condDensity="0.000138 S_per_cm2" segmentGroup="axonal" ion="ca"/>
                <channelDensityNernst id="somatic_gCa_LVAstbar_Ca_LVAst" ionChannel="Ca_LVAst" condDensity="0.005574 S_per_cm2" segmentGroup="somatic" ion="ca"/>
                <channelDensityNernst id="somatic_gCabar_Ca" ionChannel="Ca" condDensity="0.000792 S_per_cm2" segmentGroup="somatic" ion="ca"/>
                <channelDensityNonUniform id="basal_gK_Tstbar_K_Tst" ionChannel="K_Tst" erev="-85.0 mV" ion="k">
                    <variableParameter segmentGroup="basal" parameter="condDensity">
                        <inhomogeneousValue value="1e4 * ((-0.869600 + 2.087000*exp((p--1000.000000)*-0.003000))*0.002940)" inhomogeneousParameter="PathLengthOver_basal"/>
                    </variableParameter>
                </channelDensityNonUniform>
                <channelDensityNonUniform id="basal_gIhbar_Ih" ionChannel="Ih" erev="-45.0 mV" ion="hcn">
                    <variableParameter segmentGroup="basal" parameter="condDensity">
                        <inhomogeneousValue value="1e4 * ((-0.869600 + 2.087000*exp((p-0.000000)*0.003000))*0.000051)" inhomogeneousParameter="PathLengthOver_basal"/>
                    </variableParameter>
                </channelDensityNonUniform>
                <channelDensityNonUniform id="basal_gImbar_Im" ionChannel="Im" erev="-85.0 mV" ion="k">
                    <variableParameter segmentGroup="basal" parameter="condDensity">
                        <inhomogeneousValue value="1e4 * ((-0.869600 + 2.087000*exp((p--1000.000000)*-0.003000))*0.000371)" inhomogeneousParameter="PathLengthOver_basal"/>
                    </variableParameter>
                </channelDensityNonUniform>
                <channelDensityNonUniform id="apical_gK_Tstbar_K_Tst" ionChannel="K_Tst" erev="-85.0 mV" ion="k">
                    <variableParameter segmentGroup="apical" parameter="condDensity">
                        <inhomogeneousValue value="1e4 * ((-0.869600 + 2.087000*exp((p--1000.000000)*-0.003000))*0.002940)" inhomogeneousParameter="PathLengthOver_apical"/>
                    </variableParameter>
                </channelDensityNonUniform>
                <channelDensityNonUniform id="apical_gIhbar_Ih" ionChannel="Ih" erev="-45.0 mV" ion="hcn">
                    <variableParameter segmentGroup="apical" parameter="condDensity">
                        <inhomogeneousValue value="1e4 * ((-0.869600 + 2.087000*exp((p-0.000000)*0.003000))*0.000051)" inhomogeneousParameter="PathLengthOver_apical"/>
                    </variableParameter>
                </channelDensityNonUniform>
                <channelDensityNonUniform id="apical_gImbar_Im" ionChannel="Im" erev="-85.0 mV" ion="k">
                    <variableParameter segmentGroup="apical" parameter="condDensity">
                        <inhomogeneousValue value="1e4 * ((-0.869600 + 2.087000*exp((p--1000.000000)*-0.003000))*0.000371)" inhomogeneousParameter="PathLengthOver_apical"/>
                    </variableParameter>
                </channelDensityNonUniform>
                <specificCapacitance segmentGroup="basal" value="1.0 uF_per_cm2"/>
                <specificCapacitance segmentGroup="apical" value="1.0 uF_per_cm2"/>
                <specificCapacitance segmentGroup="axonal" value="1.0 uF_per_cm2"/>
                <specificCapacitance segmentGroup="somatic" value="1.0 uF_per_cm2"/>
                <initMembPotential segmentGroup="all" value="-80 mV"/>
            </membraneProperties>
            <intracellularProperties>
                <species segmentGroup="axonal" ion="ca" initialExtConcentration="2.0E-6 mol_per_cm3" concentrationModel="CaDynamics_E2_NML2__bIR_1_axonal" id="ca" initialConcentration="5.0E-11 mol_per_cm3"/>
                <species segmentGroup="somatic" ion="ca" initialExtConcentration="2.0E-6 mol_per_cm3" concentrationModel="CaDynamics_E2_NML2__bIR_1_somatic" id="ca" initialConcentration="5.0E-11 mol_per_cm3"/>
                <resistivity segmentGroup="all" value="100 ohm_cm"/>
            </intracellularProperties>
        </biophysicalProperties>
    </cell>
</neuroml>
