<neuroml xmlns="http://www.neuroml.org/schema/neuroml2"  xmlns:xs="http://www.w3.org/2001/XMLSchema" xmlns:xsi="http://www.w3.org/2001/XMLSchema-instance" xsi:schemaLocation="http://www.neuroml.org/schema/neuroml2 https://raw.github.com/NeuroML/NeuroML2/development/Schemas/NeuroML2/NeuroML_v2beta4.xsd" id="NeuroML2_file_exported_from_NEURON">
    <include href="pas.channel.nml"></include>
    <include href="Ih.channel.nml"></include>
    <include href="NaTs2_t.channel.nml"></include>
    <include href="SKv3_1.channel.nml"></include>
    <include href="Im.channel.nml"></include>
    <include href="NaTa_t.channel.nml"></include>
    <include href="K_Tst.channel.nml"></include>
    <include href="Nap_Et2.channel.nml"></include>
    <include href="SK_E2.channel.nml"></include>
    <include href="Ca_HVA.channel.nml"></include>
    <include href="K_Pst.channel.nml"></include>
    <include href="CaDynamics_E2_NML2.nml"></include>
    <include href="Ca_LVAst.channel.nml"></include>
    <cell id="cADpyr232_L5_TTPC1_b6836fcf6f_0_0">
        <notes>

Export of a cell model obtained from the BBP Neocortical Microcircuit Collaboration Portal into NeuroML2

******************************************************
*  This export to NeuroML2 has not yet been fully validated!!
*  Use with caution!!
******************************************************

For more information on this cell model see: https://bbp.epfl.ch/nmc-portal/microcircuit#/metype/L5_TTPC1_L5PC/details

</notes>
        <morphology id="morphology">
            <segment id="0" name="Seg0_soma_0">
                <proximal y="-1.190290e+01" x="-2.608170e+00" z="0.000000e+00" diameter="4.842780e+00"/>
                <distal y="-1.075950e+01" x="-2.327650e+00" z="0.000000e+00" diameter="9.004870e+00"/>
            </segment>
            <segment id="2" name="Seg1_soma_0">
                <parent fractionAlong="1" segment="0"/>
                <distal y="-9.616110e+00" x="-2.047120e+00" z="0.000000e+00" diameter="1.115730e+01"/>
            </segment>
            <segment id="3" name="Seg2_soma_0">
                <parent fractionAlong="1" segment="2"/>
                <distal y="-8.472730e+00" x="-1.766590e+00" z="0.000000e+00" diameter="1.329830e+01"/>
            </segment>
            <segment id="4" name="Seg3_soma_0">
                <parent fractionAlong="1" segment="3"/>
                <distal y="-7.329340e+00" x="-1.486070e+00" z="0.000000e+00" diameter="1.506180e+01"/>
            </segment>
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            <segmentGroup neuroLexId="sao864921383" id="soma_0">
                <notes>This group contains an unbranched set of segments, and all of the segmentGroups marked with
             neuroLexId = sao864921383 form a non-overlapping set of all of the segments.
             These segmentGroups correspond to the 'cables' of NeuroML v1.8.1, and map to/from NEURON sections.</notes>
                <member segment="0"/>
                <member segment="2"/>
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            </segmentGroup>
            <segmentGroup neuroLexId="sao864921383" id="apic_0">
                <notes>This group contains an unbranched set of segments, and all of the segmentGroups marked with
             neuroLexId = sao864921383 form a non-overlapping set of all of the segments.
             These segmentGroups correspond to the 'cables' of NeuroML v1.8.1, and map to/from NEURON sections.</notes>
                <property tag="numberInternalDivisions" value="3"/>
                <member segment="936"/>
                <member segment="937"/>
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            </segmentGroup>
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            <segmentGroup id="all">
                <include segmentGroup="soma_0"/>
                <include segmentGroup="apic_0"/>
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            </segmentGroup>
            <segmentGroup id="ModelViewParmSubset_1">
                <include segmentGroup="soma_0"/>
                <include segmentGroup="apic_0"/>
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            </segmentGroup>
            <segmentGroup id="ModelViewParmSubset_2">
                <include segmentGroup="soma_0"/>
                <include segmentGroup="axon_0"/>
                <include segmentGroup="axon_1"/>
            </segmentGroup>
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            <segmentGroup id="basal">
                <include segmentGroup="dend_0"/>
                <include segmentGroup="dend_1"/>
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                <inhomogeneousParameter id="PathLengthOver_basal" variable="p" metric="Path Length from root">
                    <proximal translationStart="0.000000e+00"/>
                </inhomogeneousParameter>
            </segmentGroup>
            <segmentGroup id="apical">
                <include segmentGroup="apic_0"/>
                <include segmentGroup="apic_1"/>
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                <inhomogeneousParameter id="PathLengthOver_apical" variable="p" metric="Path Length from root">
                    <proximal translationStart="0.000000e+00"/>
                </inhomogeneousParameter>
            </segmentGroup>
            <segmentGroup id="axonal">
                <include segmentGroup="axon_0"/>
                <include segmentGroup="axon_1"/>
            </segmentGroup>
            <segmentGroup id="somatic">
                <include segmentGroup="soma_0"/>
            </segmentGroup>
        </morphology>
        <biophysicalProperties id="biophys">
            <membraneProperties>
                <channelDensity id="all_g_pas" segmentGroup="all" ion="non_specific" ionChannel="pas" erev="-75 mV" condDensity="3e-5 S_per_cm2"/>
                <channelDensity id="basal_gIhbar_Ih" segmentGroup="basal" ion="hcn" ionChannel="Ih" erev="-45.0 mV" condDensity="8e-05 S_per_cm2"/>
                <channelDensity id="apical_gNaTs2_tbar_NaTs2_t" segmentGroup="apical" ion="na" ionChannel="NaTs2_t" erev="50.0 mV" condDensity="0.026145 S_per_cm2"/>
                <channelDensity id="apical_gSKv3_1bar_SKv3_1" segmentGroup="apical" ion="k" ionChannel="SKv3_1" erev="-85.0 mV" condDensity="0.004226 S_per_cm2"/>
                <channelDensity id="apical_gImbar_Im" segmentGroup="apical" ion="k" ionChannel="Im" erev="-85.0 mV" condDensity="0.000143 S_per_cm2"/>
                <channelDensity id="axonal_gNaTa_tbar_NaTa_t" segmentGroup="axonal" ion="na" ionChannel="NaTa_t" erev="50.0 mV" condDensity="3.137968 S_per_cm2"/>
                <channelDensity id="axonal_gK_Tstbar_K_Tst" segmentGroup="axonal" ion="k" ionChannel="K_Tst" erev="-85.0 mV" condDensity="0.089259 S_per_cm2"/>
                <channelDensity id="axonal_gNap_Et2bar_Nap_Et2" segmentGroup="axonal" ion="na" ionChannel="Nap_Et2" erev="50.0 mV" condDensity="0.006827 S_per_cm2"/>
                <channelDensity id="axonal_gSK_E2bar_SK_E2" segmentGroup="axonal" ion="k" ionChannel="SK_E2" erev="-85.0 mV" condDensity="0.007104 S_per_cm2"/>
                <channelDensity id="axonal_gK_Pstbar_K_Pst" segmentGroup="axonal" ion="k" ionChannel="K_Pst" erev="-85.0 mV" condDensity="0.973538 S_per_cm2"/>
                <channelDensity id="axonal_gSKv3_1bar_SKv3_1" segmentGroup="axonal" ion="k" ionChannel="SKv3_1" erev="-85.0 mV" condDensity="1.021945 S_per_cm2"/>
                <channelDensity id="somatic_gSKv3_1bar_SKv3_1" segmentGroup="somatic" ion="k" ionChannel="SKv3_1" erev="-85.0 mV" condDensity="0.303472 S_per_cm2"/>
                <channelDensity id="somatic_gSK_E2bar_SK_E2" segmentGroup="somatic" ion="k" ionChannel="SK_E2" erev="-85.0 mV" condDensity="0.008407 S_per_cm2"/>
                <channelDensity id="somatic_gNaTs2_tbar_NaTs2_t" segmentGroup="somatic" ion="na" ionChannel="NaTs2_t" erev="50.0 mV" condDensity="0.983955 S_per_cm2"/>
                <channelDensity id="somatic_gIhbar_Ih" segmentGroup="somatic" ion="hcn" ionChannel="Ih" erev="-45.0 mV" condDensity="8e-05 S_per_cm2"/>
                <channelDensityNernst id="axonal_gCa_HVAbar_Ca_HVA" ionChannel="Ca_HVA" condDensity="0.00099 S_per_cm2" segmentGroup="axonal" ion="ca"/>
                <channelDensityNernst id="axonal_gCa_LVAstbar_Ca_LVAst" ionChannel="Ca_LVAst" condDensity="0.008752 S_per_cm2" segmentGroup="axonal" ion="ca"/>
                <channelDensityNernst id="somatic_gCa_HVAbar_Ca_HVA" ionChannel="Ca_HVA" condDensity="0.000994 S_per_cm2" segmentGroup="somatic" ion="ca"/>
                <channelDensityNernst id="somatic_gCa_LVAstbar_Ca_LVAst" ionChannel="Ca_LVAst" condDensity="0.000333 S_per_cm2" segmentGroup="somatic" ion="ca"/>
                <channelDensityNonUniform id="apical_gIhbar_Ih" ionChannel="Ih" erev="-45.0 mV" ion="hcn">
                    <variableParameter segmentGroup="apical" parameter="condDensity">
                        <inhomogeneousValue value="1e4 * ((-0.869600 + 2.087000*exp((p-0.000000)*0.003100))*0.000080)" inhomogeneousParameter="PathLengthOver_apical"/>
                    </variableParameter>
                </channelDensityNonUniform>
                <specificCapacitance segmentGroup="basal" value="2 uF_per_cm2"/>
                <specificCapacitance segmentGroup="apical" value="2 uF_per_cm2"/>
                <specificCapacitance segmentGroup="axonal" value="1.0 uF_per_cm2"/>
                <specificCapacitance segmentGroup="somatic" value="1.0 uF_per_cm2"/>
                <initMembPotential segmentGroup="all" value="-80 mV"/>
            </membraneProperties>
            <intracellularProperties>
                <species segmentGroup="axonal" ion="ca" initialExtConcentration="2.0E-6 mol_per_cm3" concentrationModel="CaDynamics_E2_NML2__cADpyr_232_axonal" id="ca" initialConcentration="5.0E-11 mol_per_cm3"/>
                <species segmentGroup="somatic" ion="ca" initialExtConcentration="2.0E-6 mol_per_cm3" concentrationModel="CaDynamics_E2_NML2__cADpyr_232_somatic" id="ca" initialConcentration="5.0E-11 mol_per_cm3"/>
                <resistivity segmentGroup="all" value="100 ohm_cm"/>
            </intracellularProperties>
        </biophysicalProperties>
    </cell>
</neuroml>
