<?xml version="1.0" encoding="UTF-8"?>
<neuroml xmlns="http://www.neuroml.org/schema/neuroml2" xmlns:xsi="http://www.w3.org/2001/XMLSchema-instance" xsi:schemaLocation="http://www.neuroml.org/schema/neuroml2  https://raw.githubusercontent.com/NeuroML/NeuroML2/development/Schemas/NeuroML2/NeuroML_v2beta4.xsd" id="pinskyRinzel1994">

    <notes>Pinsky Rinzel 1994 cell instances with parameters to reproduce Figure 2</notes>

    <pinskyRinzelCA3Cell id="pr2A" iSoma="0.75 uA_per_cm2" iDend="0 uA_per_cm2" gc="2.1 mS_per_cm2" qd0="0"
                        gLs="0.1 mS_per_cm2" gLd="0.1 mS_per_cm2" gNa="30 mS_per_cm2" gKdr="15 mS_per_cm2"
                        gCa="10 mS_per_cm2" gKahp="0.8 mS_per_cm2" gKC="15 mS_per_cm2" eNa="60 mV" eCa="80 mV" eK="-75 mV" eL="-60 mV"
                        pp="0.5" cm="3 uF_per_cm2" alphac="2" betac="0.1"
                        gNmda="0 mS_per_cm2" gAmpa="0 mS_per_cm2" />

    <pinskyRinzelCA3Cell id="pr2B" iSoma="-0.5 uA_per_cm2" iDend="2.49 uA_per_cm2" gc="2.1 mS_per_cm2" qd0="0"
                        gLs="0.1 mS_per_cm2" gLd="0.1 mS_per_cm2" gNa="30 mS_per_cm2" gKdr="15 mS_per_cm2"
                        gCa="10 mS_per_cm2" gKahp="0.8 mS_per_cm2" gKC="15 mS_per_cm2" eNa="60 mV" eCa="80 mV" eK="-75 mV" eL="-60 mV"
                        pp="0.5" cm="3 uF_per_cm2" alphac="2" betac="0.1"
                        gNmda="0 mS_per_cm2" gAmpa="0 mS_per_cm2" />

    <pinskyRinzelCA3Cell id="pr2C" iSoma="2.5 uA_per_cm2" iDend="0 uA_per_cm2" gc="2.1 mS_per_cm2" qd0="0"
                        gLs="0.1 mS_per_cm2" gLd="0.1 mS_per_cm2" gNa="30 mS_per_cm2" gKdr="15 mS_per_cm2"
                        gCa="10 mS_per_cm2" gKahp="0.8 mS_per_cm2" gKC="15 mS_per_cm2" eNa="60 mV" eCa="80 mV" eK="-75 mV" eL="-60 mV"
                        pp="0.5" cm="3 uF_per_cm2" alphac="2" betac="0.1"
                        gNmda="0 mS_per_cm2" gAmpa="0 mS_per_cm2" />

    <pinskyRinzelCA3Cell id="pr2D" iSoma="2.5 uA_per_cm2" iDend="0 uA_per_cm2" gc="10.5 mS_per_cm2" qd0="0"
                        gLs="0.1 mS_per_cm2" gLd="0.1 mS_per_cm2" gNa="30 mS_per_cm2" gKdr="15 mS_per_cm2"
                        gCa="10 mS_per_cm2" gKahp="0.8 mS_per_cm2" gKC="15 mS_per_cm2" eNa="60 mV" eCa="80 mV" eK="-75 mV" eL="-60 mV"
                        pp="0.5" cm="3 uF_per_cm2" alphac="2" betac="0.1"
                        gNmda="0 mS_per_cm2" gAmpa="0 mS_per_cm2" />

    <pinskyRinzelCA3Cell id="pr2E" iSoma="-0.5 uA_per_cm2" iDend="2 uA_per_cm2" gc="1.425 mS_per_cm2" qd0="0.14"
                        gLs="0.1 mS_per_cm2" gLd="0.1 mS_per_cm2" gNa="30 mS_per_cm2" gKdr="15 mS_per_cm2"
                        gCa="10 mS_per_cm2" gKahp="0.8 mS_per_cm2" gKC="15 mS_per_cm2" eNa="60 mV" eCa="80 mV" eK="-75 mV" eL="-60 mV"
                        pp="0.5" cm="3 uF_per_cm2" alphac="2" betac="0.1"
                        gNmda="0 mS_per_cm2" gAmpa="0 mS_per_cm2" />

    <network id="net1">
        <population id="prApop" component="pr2A" size="1"/>
        <population id="prBpop" component="pr2B" size="1"/>
        <population id="prCpop" component="pr2C" size="1"/>
        <population id="prDpop" component="pr2D" size="1"/>
        <population id="prEpop" component="pr2E" size="1"/>
    </network>

</neuroml>
