<neuroml xmlns="http://www.neuroml.org/schema/neuroml2"  xmlns:xs="http://www.w3.org/2001/XMLSchema" xmlns:xsi="http://www.w3.org/2001/XMLSchema-instance" xsi:schemaLocation="http://www.neuroml.org/schema/neuroml2 https://raw.github.com/NeuroML/NeuroML2/development/Schemas/NeuroML2/NeuroML_v2beta5.xsd" id="M1_5percent">
    <notes>NeuroML 2 file exported from NetPyNE v0.7.5</notes>
    <izhikevich2007Cell id="CELL_SOM" C="100.0 pF" v0="-56 mV" k="1.0 nS_per_mV" vr="-56 mV" vt="-42 mV" vpeak="40 mV" a="0.03 per_ms" b="8 nS" c="-53 mV" d="20 pA"/>
</neuroml>
