<neuroml xmlns="http://www.neuroml.org/schema/neuroml2"  xmlns:xs="http://www.w3.org/2001/XMLSchema" xmlns:xsi="http://www.w3.org/2001/XMLSchema-instance" xsi:schemaLocation="http://www.neuroml.org/schema/neuroml2 https://raw.github.com/NeuroML/NeuroML2/development/Schemas/NeuroML2/NeuroML_v2beta5.xsd" id="M1_5percent">
    <notes>NeuroML 2 file exported from NetPyNE v0.7.5</notes>
    <izhikevich2007Cell id="CELL_PT" C="150.0 pF" v0="-75 mV" k="1.2 nS_per_mV" vr="-75 mV" vt="-45 mV" vpeak="50 mV" a="0.01 per_ms" b="5 nS" c="-56 mV" d="130 pA"/>
</neuroml>
