<neuroml xmlns="http://www.neuroml.org/schema/neuroml2"  xmlns:xs="http://www.w3.org/2001/XMLSchema" xmlns:xsi="http://www.w3.org/2001/XMLSchema-instance" xsi:schemaLocation="http://www.neuroml.org/schema/neuroml2 https://raw.github.com/NeuroML/NeuroML2/development/Schemas/NeuroML2/NeuroML_v2beta5.xsd" id="M1_5percent">
    <notes>NeuroML 2 file exported from NetPyNE v0.7.5</notes>
    <izhikevich2007Cell id="CELL_IT" C="100 pF" v0="-60 mV" k="0.7 nS_per_mV" vr="-60 mV" vt="-40 mV" vpeak="35 mV" a="0.03 per_ms" b="-2 nS" c="-50 mV" d="100 pA"/>
</neuroml>
