<neuroml xmlns="http://www.neuroml.org/schema/neuroml2"  xmlns:xs="http://www.w3.org/2001/XMLSchema" xmlns:xsi="http://www.w3.org/2001/XMLSchema-instance" xsi:schemaLocation="http://www.neuroml.org/schema/neuroml2 https://raw.github.com/NeuroML/NeuroML2/development/Schemas/NeuroML2/NeuroML_v2beta5.xsd" id="M1_5percent">
    <notes>NeuroML 2 file exported from NetPyNE v0.7.5</notes>
    <izhikevich2007Cell id="CELL_PV" C="20.0 pF" v0="-55 mV" k="1.0 nS_per_mV" vr="-55 mV" vt="-40 mV" vpeak="25 mV" a="0.2 per_ms" b="-2 nS" c="-45 mV" d="-55 pA"/>
</neuroml>
