<?xml version="1.0" encoding="iso-8859-1"?>
<neuroml xmlns="http://www.neuroml.org/schema/neuroml2" xmlns:xsi="http://www.w3.org/2001/XMLSchema-instance" xsi:schemaLocation="http://www.neuroml.org/schema/neuroml2 https://raw.github.com/NeuroML/NeuroML2/master/Schemas/NeuroML2/NeuroML_v2beta.xsd" id="">

    <notes>ChannelML file based on Traub et al. 2003</notes>

    <decayingPoolConcentrationModel ion="ca" shellThickness="cm" id="cad" restingConc="0mol_per_cm3" decayConstant="ms"/>

</neuroml>
