<?xml version="1.0" encoding="UTF-8"?>
<neuroml xmlns="http://www.neuroml.org/schema/neuroml2" xmlns:xsi="http://www.w3.org/2001/XMLSchema-instance" xsi:schemaLocation="http://www.neuroml.org/schema/neuroml2  https://raw.githubusercontent.com/NeuroML/NeuroML2/development/Schemas/NeuroML2/NeuroML_v2beta5.xsd" id="network_VervaekeEtAl_GolgiCellNetwork">

    <notes>

Network structure (NeuroML 2beta5) for project: VervaekeEtAl-GolgiCellNetwork saved with neuroConstruct v1.7.1 on: 19:01:13, 27-Sep-17

Cell Group: CellGroup_1 contains 45 cells

Network connection: NetConn_CellGroup_1_CellGroup_1 contains 352 individual synaptic connections

    </notes>

    <include href="ApicalSyn.synapse.nml"/>

    <include href="GapJuncCML.nml"/>
    <include href="Golgi_040408_C1.cell.nml"/>

    <poissonFiringSynapse id="Input_20" averageRate="0.5 per_s" synapse="ApicalSyn" spikeTarget="./ApicalSyn"/>

    <network id="network_VervaekeEtAl_GolgiCellNetwork" type="networkWithTemperature" temperature="23.0 degC">

        <population id="CellGroup_1" component="Golgi_040408_C1" type="populationList" size="45">
            <instance id="0">
                <location x="1.8063873" y="19.040333" z="158.66382"/>
            </instance>
            <instance id="1">
                <location x="209.08464" y="32.64334" z="44.90784"/>
            </instance>
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        </population>

        <electricalProjection id="NetConn_CellGroup_1_CellGroup_1" presynapticPopulation="CellGroup_1" postsynapticPopulation="CellGroup_1">
            <electricalConnectionInstance id="0" preCell="../CellGroup_1/0/Golgi_040408_C1" postCell="../CellGroup_1/24/Golgi_040408_C1" preSegment="4006" preFractionAlong="0.34745952" postSegment="3914" postFractionAlong="0.57669306" synapse="GapJuncCML" />
            <electricalConnectionInstance id="1" preCell="../CellGroup_1/0/Golgi_040408_C1" postCell="../CellGroup_1/41/Golgi_040408_C1" preSegment="3243" preFractionAlong="0.7436454" postSegment="4328" postFractionAlong="0.7180882" synapse="GapJuncCML" />
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        </electricalProjection>
<!--
        <inputList id="Input_21" component="Input_21" population="CellGroup_1">
            <input id="0" target="../CellGroup_1/0/Golgi_040408_C1_varLeakInitPot" destination="synapses" segmentId="4244" fractionAlong="0.06991738"/>
            <input id="1" target="../CellGroup_1/0/Golgi_040408_C1_varLeakInitPot" destination="synapses" segmentId="4416" fractionAlong="0.34693953"/>
            <input id="2" target="../CellGroup_1/0/Golgi_040408_C1_varLeakInitPot" destination="synapses" segmentId="4655" fractionAlong="0.26503712"/>
            <input id="3" target="../CellGroup_1/0/Golgi_040408_C1_varLeakInitPot" destination="synapses" segmentId="4275" fractionAlong="0.60407895"/>
            <input id="4" target="../CellGroup_1/0/Golgi_040408_C1_varLeakInitPot" destination="synapses" segmentId="4194" fractionAlong="0.79153395"/>
            <input id="5" target="../CellGroup_1/0/Golgi_040408_C1_varLeakInitPot" destination="synapses" segmentId="4235" fractionAlong="0.11494166"/>
            <input id="6" target="../CellGroup_1/0/Golgi_040408_C1_varLeakInitPot" destination="synapses" segmentId="4339" fractionAlong="0.7618423"/>
            <input id="7" target="../CellGroup_1/0/Golgi_040408_C1_varLeakInitPot" destination="synapses" segmentId="4424" fractionAlong="0.10899723"/>
            <input id="8" target="../CellGroup_1/0/Golgi_040408_C1_varLeakInitPot" destination="synapses" segmentId="4267" fractionAlong="0.0861464"/>
            <input id="9" target="../CellGroup_1/0/Golgi_040408_C1_varLeakInitPot" destination="synapses" segmentId="4467" fractionAlong="0.39949298"/>
            <input id="10" target="../CellGroup_1/0/Golgi_040408_C1_varLeakInitPot" destination="synapses" segmentId="4626" fractionAlong="0.16211112"/>
            <input id="11" target="../CellGroup_1/0/Golgi_040408_C1_varLeakInitPot" destination="synapses" segmentId="4339" fractionAlong="0.40564644"/>
            <input id="12" target="../CellGroup_1/0/Golgi_040408_C1_varLeakInitPot" destination="synapses" segmentId="4524" fractionAlong="0.238355"/>
            <input id="13" target="../CellGroup_1/0/Golgi_040408_C1_varLeakInitPot" destination="synapses" segmentId="4424" fractionAlong="0.9120931"/>
            <input id="14" target="../CellGroup_1/0/Golgi_040408_C1_varLeakInitPot" destination="synapses" segmentId="4477" fractionAlong="0.11138662"/>
            <input id="15" target="../CellGroup_1/0/Golgi_040408_C1_varLeakInitPot" destination="synapses" segmentId="4514" fractionAlong="0.12818657"/>
            <input id="16" target="../CellGroup_1/0/Golgi_040408_C1_varLeakInitPot" destination="synapses" segmentId="4674" fractionAlong="0.974947"/>
            <input id="17" target="../CellGroup_1/0/Golgi_040408_C1_varLeakInitPot" destination="synapses" segmentId="4692" fractionAlong="0.10246265"/>
            <input id="18" target="../CellGroup_1/0/Golgi_040408_C1_varLeakInitPot" destination="synapses" segmentId="4195" fractionAlong="0.82027805"/>
            <input id="19" target="../CellGroup_1/0/Golgi_040408_C1_varLeakInitPot" destination="synapses" segmentId="4315" fractionAlong="0.057668656"/>
            <input id="20" target="../CellGroup_1/1/Golgi_040408_C1_varLeakInitPot" destination="synapses" segmentId="4491" fractionAlong="0.81826127"/>
            <input id="21" target="../CellGroup_1/1/Golgi_040408_C1_varLeakInitPot" destination="synapses" segmentId="4518" fractionAlong="0.21179506"/>
            <input id="22" target="../CellGroup_1/1/Golgi_040408_C1_varLeakInitPot" destination="synapses" segmentId="4434" fractionAlong="0.21232319"/>
            <input id="23" target="../CellGroup_1/1/Golgi_040408_C1_varLeakInitPot" destination="synapses" segmentId="4650" fractionAlong="0.9885397"/>
            <input id="24" target="../CellGroup_1/1/Golgi_040408_C1_varLeakInitPot" destination="synapses" segmentId="4297" fractionAlong="0.9273651"/>
            <input id="25" target="../CellGroup_1/1/Golgi_040408_C1_varLeakInitPot" destination="synapses" segmentId="4666" fractionAlong="0.18935701"/>
            <input id="26" target="../CellGroup_1/1/Golgi_040408_C1_varLeakInitPot" destination="synapses" segmentId="4542" fractionAlong="0.17856364"/>
            <input id="27" target="../CellGroup_1/1/Golgi_040408_C1_varLeakInitPot" destination="synapses" segmentId="4649" fractionAlong="0.5719804"/>
            <input id="28" target="../CellGroup_1/1/Golgi_040408_C1_varLeakInitPot" destination="synapses" segmentId="4621" fractionAlong="0.16900331"/>
            <input id="29" target="../CellGroup_1/1/Golgi_040408_C1_varLeakInitPot" destination="synapses" segmentId="4296" fractionAlong="0.6086496"/>
            <input id="30" target="../CellGroup_1/1/Golgi_040408_C1_varLeakInitPot" destination="synapses" segmentId="4500" fractionAlong="0.12994947"/>
            <input id="31" target="../CellGroup_1/1/Golgi_040408_C1_varLeakInitPot" destination="synapses" segmentId="4208" fractionAlong="0.52717906"/>
            <input id="32" target="../CellGroup_1/1/Golgi_040408_C1_varLeakInitPot" destination="synapses" segmentId="4619" fractionAlong="0.33447537"/>
            <input id="33" target="../CellGroup_1/1/Golgi_040408_C1_varLeakInitPot" destination="synapses" segmentId="4592" fractionAlong="0.19067961"/>
            <input id="34" target="../CellGroup_1/1/Golgi_040408_C1_varLeakInitPot" destination="synapses" segmentId="4672" fractionAlong="0.3492807"/>
            <input id="35" target="../CellGroup_1/1/Golgi_040408_C1_varLeakInitPot" destination="synapses" segmentId="4527" fractionAlong="0.35175923"/>
            <input id="36" target="../CellGroup_1/1/Golgi_040408_C1_varLeakInitPot" destination="synapses" segmentId="4274" fractionAlong="0.39227092"/>
            <input id="37" target="../CellGroup_1/1/Golgi_040408_C1_varLeakInitPot" destination="synapses" segmentId="4507" fractionAlong="0.6250141"/>
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        </inputList>-->

        <inputList id="Input_20" component="Input_20" population="CellGroup_1">
            <input id="0" target="../CellGroup_1/0/Golgi_040408_C1_varLeakInitPot" destination="synapses" segmentId="4181" fractionAlong="0.6283141"/>
            <input id="1" target="../CellGroup_1/0/Golgi_040408_C1_varLeakInitPot" destination="synapses" segmentId="3167" fractionAlong="0.074905574"/>
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        </inputList>

    </network>

</neuroml>
