<neuroml xmlns="http://www.neuroml.org/schema/neuroml2"  xmlns:xs="http://www.w3.org/2001/XMLSchema" xmlns:xsi="http://www.w3.org/2001/XMLSchema-instance" xsi:schemaLocation="http://www.neuroml.org/schema/neuroml2 https://raw.github.com/NeuroML/NeuroML2/development/Schemas/NeuroML2/NeuroML_v2beta5.xsd" id="M1_5percent">
    <notes>NeuroML 2 file exported from NetPyNE v0.7.5</notes>
    <include href="AMPA.synapse.nml" />
    <include href="NMDA.synapse.nml" />
    <include href="GABAA.synapse.nml" />
    <include href="GABAB.synapse.nml" />

    <include href="IT.cell.nml" />
    <include href="PT.cell.nml" />
    <include href="CT.cell.nml" />
    <include href="PV.cell.nml" />
    <include href="SOM.cell.nml" />

    <spikeGeneratorPoisson id="NetStim_background_E_IT_L4_10_1_AMPA" averageRate="10 Hz"/>
    <spikeGeneratorPoisson id="NetStim_background_E_CT_L6_10_1_AMPA" averageRate="10 Hz"/>
    <spikeGeneratorPoisson id="NetStim_background_E_PV_L5_10_1_AMPA" averageRate="10 Hz"/>
    <spikeGeneratorPoisson id="NetStim_background_E_IT_L6_10_1_AMPA" averageRate="10 Hz"/>
    <spikeGeneratorPoisson id="NetStim_background_E_SOM_L5_10_1_AMPA" averageRate="10 Hz"/>
    <spikeGeneratorPoisson id="NetStim_background_E_SOM_L23_10_1_AMPA" averageRate="10 Hz"/>
    <spikeGeneratorPoisson id="NetStim_background_E_PT_L5B_10_1_AMPA" averageRate="10 Hz"/>
    <spikeGeneratorPoisson id="NetStim_background_E_SOM_L6_10_1_AMPA" averageRate="10 Hz"/>
    <spikeGeneratorPoisson id="NetStim_background_E_IT_L23_10_1_AMPA" averageRate="10 Hz"/>
    <spikeGeneratorPoisson id="NetStim_background_E_PV_L6_10_1_AMPA" averageRate="10 Hz"/>
    <spikeGeneratorPoisson id="NetStim_background_E_IT_L5A_10_1_AMPA" averageRate="10 Hz"/>
    <spikeGeneratorPoisson id="NetStim_background_E_IT_L5B_10_1_AMPA" averageRate="10 Hz"/>
    <spikeGeneratorPoisson id="NetStim_background_E_PV_L23_10_1_AMPA" averageRate="10 Hz"/>
    <network id="M1_5percent">
        <population id="IT_L23" component="CELL_IT" size="92" type="populationList">
            <property tag="radius" value="5"/>
            <instance id="0">
                <location x="61.250152966918229" y="234.775177610159091" z="41.17034225597439"/>
            </instance>
            <instance id="1">
                <location x="44.134760472743409" y="343.847855045146332" z="29.725508022198749"/>
            </instance>
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        </population>
        <population id="IT_L4" component="CELL_IT" size="48" type="populationList">
            <property tag="radius" value="5"/>
            <instance id="0">
                <location x="47.199252172240428" y="487.416712684110564" z="52.045453731722382"/>
            </instance>
            <instance id="1">
                <location x="13.110430447030383" y="466.09207368418754" z="14.059317944462391"/>
            </instance>
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        </population>
        <population id="IT_L5A" component="CELL_IT" size="53" type="populationList">
            <property tag="radius" value="5"/>
            <instance id="0">
                <location x="15.477499687288015" y="664.546777208324784" z="11.308100020274544"/>
            </instance>
            <instance id="1">
                <location x="26.946387068343103" y="585.862381157962886" z="47.545158585946758"/>
            </instance>
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        </population>
        <population id="IT_L5B" component="CELL_IT" size="60" type="populationList">
            <property tag="radius" value="5"/>
            <instance id="0">
                <location x="24.53621989016554" y="870.055594513296342" z="61.001841042861855"/>
            </instance>
            <instance id="1">
                <location x="62.838872515277487" y="926.397002009349762" z="9.382197554242145"/>
            </instance>
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        </population>
        <population id="PT_L5B" component="CELL_PT" size="60" type="populationList">
            <property tag="radius" value="5"/>
            <instance id="0">
                <location x="58.697082260968038" y="1016.045661399363212" z="55.013407269166343"/>
            </instance>
            <instance id="1">
                <location x="55.308751495373485" y="762.590611133819834" z="6.582694672563933"/>
            </instance>
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        </population>
        <population id="IT_L6" component="CELL_IT" size="55" type="populationList">
            <property tag="radius" value="5"/>
            <instance id="0">
                <location x="4.963567189945313" y="1067.459245173968611" z="29.027892905623965"/>
            </instance>
            <instance id="1">
                <location x="40.63438016964222" y="1335.140239845928591" z="5.485434350040775"/>
            </instance>
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        </population>
        <population id="CT_L6" component="CELL_CT" size="55" type="populationList">
            <property tag="radius" value="5"/>
            <instance id="0">
                <location x="10.694326189840314" y="1247.014537745151983" z="65.349812037348229"/>
            </instance>
            <instance id="1">
                <location x="8.509570452513653" y="1094.199609810905713" z="20.777681818903076"/>
            </instance>
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        </population>
        <population id="PV_L23" component="CELL_PV" size="12" type="populationList">
            <property tag="radius" value="5"/>
            <instance id="0">
                <location x="66.57834033732982" y="287.513722067695596" z="34.530754005825436"/>
            </instance>
            <instance id="1">
                <location x="33.923470517540473" y="151.331819085443442" z="52.880455519644151"/>
            </instance>
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        </population>
        <population id="SOM_L23" component="CELL_SOM" size="12" type="populationList">
            <property tag="radius" value="5"/>
            <instance id="0">
                <location x="19.960522692952651" y="247.507402476736502" z="56.343278325570175"/>
            </instance>
            <instance id="1">
                <location x="59.894148798094065" y="342.124332452513158" z="2.353144089881142"/>
            </instance>
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        </population>
        <population id="PV_L5" component="CELL_PV" size="27" type="populationList">
            <property tag="radius" value="5"/>
            <instance id="0">
                <location x="34.553090776947457" y="603.651044508639984" z="37.546221933893172"/>
            </instance>
            <instance id="1">
                <location x="41.789762500401928" y="418.875246191775602" z="46.470655382082519"/>
            </instance>
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        </population>
        <population id="SOM_L5" component="CELL_SOM" size="27" type="populationList">
            <property tag="radius" value="5"/>
            <instance id="0">
                <location x="24.227363832679327" y="928.845716664487099" z="14.802651013768523"/>
            </instance>
            <instance id="1">
                <location x="10.752033770047879" y="620.568075633592002" z="51.57649505526684"/>
            </instance>
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        </population>
        <population id="PV_L6" component="CELL_PV" size="13" type="populationList">
            <property tag="radius" value="5"/>
            <instance id="0">
                <location x="45.614884836648208" y="1283.921112196305558" z="29.469309673631965"/>
            </instance>
            <instance id="1">
                <location x="39.125975083350966" y="1150.534085778977442" z="60.382751463083508"/>
            </instance>
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        </population>
        <population id="SOM_L6" component="CELL_SOM" size="13" type="populationList">
            <property tag="radius" value="5"/>
            <instance id="0">
                <location x="7.729232727462749" y="1280.848519242753127" z="40.707312005741414"/>
            </instance>
            <instance id="1">
                <location x="45.210490248627401" y="1343.78835053770149" z="37.202884571002684"/>
            </instance>
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        </population>
        <population id="Pop_NetStim_background_E_IT_L4_10_1_AMPA" component="NetStim_background_E_IT_L4_10_1_AMPA" size="48"/>
        <population id="Pop_NetStim_background_E_CT_L6_10_1_AMPA" component="NetStim_background_E_CT_L6_10_1_AMPA" size="55"/>
        <population id="Pop_NetStim_background_E_PV_L5_10_1_AMPA" component="NetStim_background_E_PV_L5_10_1_AMPA" size="27"/>
        <population id="Pop_NetStim_background_E_IT_L6_10_1_AMPA" component="NetStim_background_E_IT_L6_10_1_AMPA" size="55"/>
        <population id="Pop_NetStim_background_E_SOM_L5_10_1_AMPA" component="NetStim_background_E_SOM_L5_10_1_AMPA" size="27"/>
        <population id="Pop_NetStim_background_E_SOM_L23_10_1_AMPA" component="NetStim_background_E_SOM_L23_10_1_AMPA" size="12"/>
        <population id="Pop_NetStim_background_E_PT_L5B_10_1_AMPA" component="NetStim_background_E_PT_L5B_10_1_AMPA" size="60"/>
        <population id="Pop_NetStim_background_E_SOM_L6_10_1_AMPA" component="NetStim_background_E_SOM_L6_10_1_AMPA" size="13"/>
        <population id="Pop_NetStim_background_E_IT_L23_10_1_AMPA" component="NetStim_background_E_IT_L23_10_1_AMPA" size="92"/>
        <population id="Pop_NetStim_background_E_PV_L6_10_1_AMPA" component="NetStim_background_E_PV_L6_10_1_AMPA" size="13"/>
        <population id="Pop_NetStim_background_E_IT_L5A_10_1_AMPA" component="NetStim_background_E_IT_L5A_10_1_AMPA" size="53"/>
        <population id="Pop_NetStim_background_E_IT_L5B_10_1_AMPA" component="NetStim_background_E_IT_L5B_10_1_AMPA" size="60"/>
        <population id="Pop_NetStim_background_E_PV_L23_10_1_AMPA" component="NetStim_background_E_PV_L23_10_1_AMPA" size="12"/>
        <projection id="NetConn_IT_L23_PV_L5_AMPA" presynapticPopulation="IT_L23" postsynapticPopulation="PV_L5" synapse="AMPA">
            <connectionWD id="0" preCellId="../IT_L23/79/CELL_IT" postCellId="../PV_L5/0/CELL_PV" weight="0.000033" delay="4.15042341737 ms"/>
            <connectionWD id="1" preCellId="../IT_L23/29/CELL_IT" postCellId="../PV_L5/2/CELL_PV" weight="0.000033" delay="7.41986652281 ms"/>
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        </projection>
        <projection id="NetConn_IT_L5B_SOM_L5_AMPA" presynapticPopulation="IT_L5B" postsynapticPopulation="SOM_L5" synapse="AMPA">
            <connectionWD id="0" preCellId="../IT_L5B/15/CELL_IT" postCellId="../SOM_L5/0/CELL_SOM" weight="0.00003675" delay="2.15821758209 ms"/>
            <connectionWD id="1" preCellId="../IT_L5B/29/CELL_IT" postCellId="../SOM_L5/0/CELL_SOM" weight="0.00003675" delay="2.80097127715 ms"/>
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        </projection>
        <projection id="NetConn_SOM_L6_SOM_L6_GABAB" presynapticPopulation="SOM_L6" postsynapticPopulation="SOM_L6" synapse="GABAB">
            <connectionWD id="0" preCellId="../SOM_L6/1/CELL_SOM" postCellId="../SOM_L6/0/CELL_SOM" weight="0.00015" delay="2.73338584936 ms"/>
            <connectionWD id="1" preCellId="../SOM_L6/2/CELL_SOM" postCellId="../SOM_L6/0/CELL_SOM" weight="0.00015" delay="2.64362324282 ms"/>
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        </projection>
        <projection id="NetConn_CT_L6_CT_L6_AMPA" presynapticPopulation="CT_L6" postsynapticPopulation="CT_L6" synapse="AMPA">
            <connectionWD id="0" preCellId="../CT_L6/16/CELL_CT" postCellId="../CT_L6/1/CELL_CT" weight="0.000147" delay="2.76988510889 ms"/>
            <connectionWD id="1" preCellId="../CT_L6/28/CELL_CT" postCellId="../CT_L6/1/CELL_CT" weight="0.000159" delay="3.98320049837 ms"/>
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        </projection>
        <projection id="NetConn_SOM_L23_IT_L23_GABAB" presynapticPopulation="SOM_L23" postsynapticPopulation="IT_L23" synapse="GABAB">
            <connectionWD id="0" preCellId="../SOM_L23/0/CELL_SOM" postCellId="../IT_L23/0/CELL_IT" weight="0.00015" delay="2.45794771614 ms"/>
            <connectionWD id="1" preCellId="../SOM_L23/3/CELL_SOM" postCellId="../IT_L23/0/CELL_IT" weight="0.00015" delay="3.10367607732 ms"/>
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        </projection>
        <projection id="NetConn_IT_L5B_CT_L6_AMPA" presynapticPopulation="IT_L5B" postsynapticPopulation="CT_L6" synapse="AMPA">
            <connectionWD id="0" preCellId="../IT_L5B/40/CELL_IT" postCellId="../CT_L6/1/CELL_CT" weight="0.000147" delay="4.02307438961 ms"/>
            <connectionWD id="1" preCellId="../IT_L5B/51/CELL_IT" postCellId="../CT_L6/1/CELL_CT" weight="0.000147" delay="2.87808798506 ms"/>
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        </projection>
        <projection id="NetConn_IT_L6_SOM_L5_AMPA" presynapticPopulation="IT_L6" postsynapticPopulation="SOM_L5" synapse="AMPA">
            <connectionWD id="0" preCellId="../IT_L6/27/CELL_IT" postCellId="../SOM_L5/0/CELL_SOM" weight="0.000074358" delay="3.92620902168 ms"/>
            <connectionWD id="1" preCellId="../IT_L6/27/CELL_IT" postCellId="../SOM_L5/1/CELL_SOM" weight="0.000074358" delay="7.01181094409 ms"/>
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        </projection>
        <projection id="NetConn_IT_L4_PT_L5B_AMPA" presynapticPopulation="IT_L4" postsynapticPopulation="PT_L5B" synapse="AMPA">
            <connectionWD id="0" preCellId="../IT_L4/23/CELL_IT" postCellId="../PT_L5B/4/CELL_PT" weight="0.000264" delay="5.09297019302 ms"/>
            <connectionWD id="1" preCellId="../IT_L4/22/CELL_IT" postCellId="../PT_L5B/4/CELL_PT" weight="0.000264" delay="4.43894445698 ms"/>
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        </projection>
        <projection id="NetConn_IT_L5A_IT_L23_AMPA" presynapticPopulation="IT_L5A" postsynapticPopulation="IT_L23" synapse="AMPA">
            <connectionWD id="0" preCellId="../IT_L5A/44/CELL_IT" postCellId="../IT_L23/0/CELL_IT" weight="0.000156" delay="5.38196968378 ms"/>
            <connectionWD id="1" preCellId="../IT_L5A/51/CELL_IT" postCellId="../IT_L23/0/CELL_IT" weight="0.000156" delay="5.26225730767 ms"/>
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        </projection>
        <projection id="NetConn_IT_L4_IT_L5B_AMPA" presynapticPopulation="IT_L4" postsynapticPopulation="IT_L5B" synapse="AMPA">
            <connectionWD id="0" preCellId="../IT_L4/17/CELL_IT" postCellId="../IT_L5B/0/CELL_IT" weight="0.000264" delay="6.08926944743 ms"/>
            <connectionWD id="1" preCellId="../IT_L4/32/CELL_IT" postCellId="../IT_L5B/0/CELL_IT" weight="0.000264" delay="6.35555512829 ms"/>
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        </projection>
        <projection id="NetConn_PT_L5B_IT_L5B_AMPA" presynapticPopulation="PT_L5B" postsynapticPopulation="IT_L5B" synapse="AMPA">
            <connectionWD id="0" preCellId="../PT_L5B/10/CELL_PT" postCellId="../IT_L5B/0/CELL_IT" weight="0.000213" delay="3.61456129372 ms"/>
            <connectionWD id="1" preCellId="../PT_L5B/53/CELL_PT" postCellId="../IT_L5B/0/CELL_IT" weight="0.000213" delay="2.97097467197 ms"/>
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        </projection>
        <projection id="NetConn_PV_L5_SOM_L5_GABAA" presynapticPopulation="PV_L5" postsynapticPopulation="SOM_L5" synapse="GABAA">
            <connectionWD id="0" preCellId="../PV_L5/2/CELL_PV" postCellId="../SOM_L5/0/CELL_SOM" weight="0.00015" delay="2.57366107949 ms"/>
            <connectionWD id="1" preCellId="../PV_L5/4/CELL_PV" postCellId="../SOM_L5/0/CELL_SOM" weight="0.00015" delay="4.45691880898 ms"/>
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        </projection>
        <projection id="NetConn_PV_L5_PT_L5B_GABAA" presynapticPopulation="PV_L5" postsynapticPopulation="PT_L5B" synapse="GABAA">
            <connectionWD id="0" preCellId="../PV_L5/5/CELL_PV" postCellId="../PT_L5B/0/CELL_PT" weight="0.00015" delay="4.26583999258 ms"/>
            <connectionWD id="1" preCellId="../PV_L5/11/CELL_PV" postCellId="../PT_L5B/0/CELL_PT" weight="0.00015" delay="5.88804171774 ms"/>
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        </projection>
        <projection id="NetConn_IT_L4_SOM_L23_AMPA" presynapticPopulation="IT_L4" postsynapticPopulation="SOM_L23" synapse="AMPA">
            <connectionWD id="0" preCellId="../IT_L4/16/CELL_IT" postCellId="../SOM_L23/1/CELL_SOM" weight="0.00010875" delay="3.56534965238 ms"/>
            <connectionWD id="1" preCellId="../IT_L4/22/CELL_IT" postCellId="../SOM_L23/2/CELL_SOM" weight="0.00010875" delay="3.29292918606 ms"/>
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        </projection>
        <projection id="NetConn_IT_L6_IT_L4_AMPA" presynapticPopulation="IT_L6" postsynapticPopulation="IT_L4" synapse="AMPA">
            <connectionWD id="0" preCellId="../IT_L6/29/CELL_IT" postCellId="../IT_L4/0/CELL_IT" weight="0.0000255" delay="7.71598192963 ms"/>
            <connectionWD id="1" preCellId="../IT_L6/29/CELL_IT" postCellId="../IT_L4/2/CELL_IT" weight="0.000051" delay="8.32237997913 ms"/>
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        </projection>
        <projection id="NetConn_IT_L4_CT_L6_AMPA" presynapticPopulation="IT_L4" postsynapticPopulation="CT_L6" synapse="AMPA">
            <connectionWD id="0" preCellId="../IT_L4/33/CELL_IT" postCellId="../CT_L6/11/CELL_CT" weight="0.000681" delay="8.75137168186 ms"/>
            <connectionWD id="1" preCellId="../IT_L4/15/CELL_IT" postCellId="../CT_L6/30/CELL_CT" weight="0.000084" delay="7.83120157288 ms"/>
        </projection>
        <projection id="NetConn_PT_L5B_SOM_L23_AMPA" presynapticPopulation="PT_L5B" postsynapticPopulation="SOM_L23" synapse="AMPA">
            <connectionWD id="0" preCellId="../PT_L5B/7/CELL_PT" postCellId="../SOM_L23/0/CELL_SOM" weight="0.00010875" delay="8.65034800949 ms"/>
            <connectionWD id="1" preCellId="../PT_L5B/21/CELL_PT" postCellId="../SOM_L23/0/CELL_SOM" weight="0.00010875" delay="8.41310280188 ms"/>
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        </projection>
        <projection id="NetConn_PT_L5B_IT_L4_AMPA" presynapticPopulation="PT_L5B" postsynapticPopulation="IT_L4" synapse="AMPA">
            <connectionWD id="0" preCellId="../PT_L5B/24/CELL_PT" postCellId="../IT_L4/0/CELL_IT" weight="0.000051" delay="4.94586538849 ms"/>
            <connectionWD id="1" preCellId="../PT_L5B/37/CELL_PT" postCellId="../IT_L4/0/CELL_IT" weight="0.000051" delay="5.10222069246 ms"/>
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        </projection>
        <projection id="NetConn_IT_L5A_IT_L6_AMPA" presynapticPopulation="IT_L5A" postsynapticPopulation="IT_L6" synapse="AMPA">
            <connectionWD id="0" preCellId="../IT_L5A/7/CELL_IT" postCellId="../IT_L6/3/CELL_IT" weight="0.000084" delay="7.80450829454 ms"/>
            <connectionWD id="1" preCellId="../IT_L5A/37/CELL_IT" postCellId="../IT_L6/10/CELL_IT" weight="0.000084" delay="7.94676035669 ms"/>
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        </projection>
        <projection id="NetConn_IT_L5A_PT_L5B_AMPA" presynapticPopulation="IT_L5A" postsynapticPopulation="PT_L5B" synapse="AMPA">
            <connectionWD id="0" preCellId="../IT_L5A/25/CELL_IT" postCellId="../PT_L5B/0/CELL_PT" weight="0.000174" delay="5.63144845624 ms"/>
            <connectionWD id="1" preCellId="../IT_L5A/29/CELL_IT" postCellId="../PT_L5B/1/CELL_PT" weight="0.000264" delay="3.44377456657 ms"/>
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        </projection>
        <projection id="NetConn_SOM_L6_PV_L6_GABAB" presynapticPopulation="SOM_L6" postsynapticPopulation="PV_L6" synapse="GABAB">
            <connectionWD id="0" preCellId="../SOM_L6/0/CELL_SOM" postCellId="../PV_L6/0/CELL_PV" weight="0.00015" delay="2.39636550804 ms"/>
            <connectionWD id="1" preCellId="../SOM_L6/3/CELL_SOM" postCellId="../PV_L6/0/CELL_PV" weight="0.00015" delay="2.44640800333 ms"/>
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        </projection>
        <projection id="NetConn_PV_L6_IT_L6_GABAA" presynapticPopulation="PV_L6" postsynapticPopulation="IT_L6" synapse="GABAA">
            <connectionWD id="0" preCellId="../PV_L6/0/CELL_PV" postCellId="../IT_L6/1/CELL_IT" weight="0.00015" delay="2.56775265208 ms"/>
            <connectionWD id="1" preCellId="../PV_L6/4/CELL_PV" postCellId="../IT_L6/1/CELL_IT" weight="0.00015" delay="2.47459424997 ms"/>
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        </projection>
        <projection id="NetConn_PV_L6_SOM_L6_GABAA" presynapticPopulation="PV_L6" postsynapticPopulation="SOM_L6" synapse="GABAA">
            <connectionWD id="0" preCellId="../PV_L6/11/CELL_PV" postCellId="../SOM_L6/0/CELL_SOM" weight="0.00015" delay="2.50525108952 ms"/>
            <connectionWD id="1" preCellId="../PV_L6/0/CELL_PV" postCellId="../SOM_L6/0/CELL_SOM" weight="0.00015" delay="2.39636550804 ms"/>
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        </projection>
        <projection id="NetConn_PV_L5_IT_L5A_GABAA" presynapticPopulation="PV_L5" postsynapticPopulation="IT_L5A" synapse="GABAA">
            <connectionWD id="0" preCellId="../PV_L5/2/CELL_PV" postCellId="../IT_L5A/0/CELL_IT" weight="0.00015" delay="4.11754613726 ms"/>
            <connectionWD id="1" preCellId="../PV_L5/3/CELL_PV" postCellId="../IT_L5A/0/CELL_IT" weight="0.00015" delay="3.14111019479 ms"/>
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        </projection>
        <projection id="NetConn_PV_L6_PV_L6_GABAA" presynapticPopulation="PV_L6" postsynapticPopulation="PV_L6" synapse="GABAA">
            <connectionWD id="0" preCellId="../PV_L6/11/CELL_PV" postCellId="../PV_L6/0/CELL_PV" weight="0.00015" delay="2.50637036618 ms"/>
            <connectionWD id="1" preCellId="../PV_L6/2/CELL_PV" postCellId="../PV_L6/0/CELL_PV" weight="0.00015" delay="3.04344889778 ms"/>
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        </projection>
        <projection id="NetConn_CT_L6_IT_L23_AMPA" presynapticPopulation="CT_L6" postsynapticPopulation="IT_L23" synapse="AMPA">
            <connectionWD id="0" preCellId="../CT_L6/31/CELL_CT" postCellId="../IT_L23/19/CELL_IT" weight="0.000051" delay="8.63595312613 ms"/>
        </projection>
        <projection id="NetConn_IT_L23_IT_L5B_AMPA" presynapticPopulation="IT_L23" postsynapticPopulation="IT_L5B" synapse="AMPA">
            <connectionWD id="0" preCellId="../IT_L23/88/CELL_IT" postCellId="../IT_L5B/0/CELL_IT" weight="0.000066" delay="8.37192552751 ms"/>
            <connectionWD id="1" preCellId="../IT_L23/30/CELL_IT" postCellId="../IT_L5B/1/CELL_IT" weight="0.000066" delay="9.34584774748 ms"/>
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        </projection>
        <projection id="NetConn_IT_L23_PV_L23_AMPA" presynapticPopulation="IT_L23" postsynapticPopulation="PV_L23" synapse="AMPA">
            <connectionWD id="0" preCellId="../IT_L23/7/CELL_IT" postCellId="../PV_L23/0/CELL_PV" weight="0.000234" delay="3.02001757793 ms"/>
            <connectionWD id="1" preCellId="../IT_L23/24/CELL_IT" postCellId="../PV_L23/0/CELL_PV" weight="0.000234" delay="3.01682489287 ms"/>
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        </projection>
        <projection id="NetConn_IT_L6_IT_L5B_AMPA" presynapticPopulation="IT_L6" postsynapticPopulation="IT_L5B" synapse="AMPA">
            <connectionWD id="0" preCellId="../IT_L6/41/CELL_IT" postCellId="../IT_L5B/0/CELL_IT" weight="0.0001515" delay="3.7487362774 ms"/>
            <connectionWD id="1" preCellId="../IT_L6/9/CELL_IT" postCellId="../IT_L5B/0/CELL_IT" weight="0.00009" delay="4.73946710338 ms"/>
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        </projection>
        <projection id="NetConn_IT_L4_IT_L6_AMPA" presynapticPopulation="IT_L4" postsynapticPopulation="IT_L6" synapse="AMPA">
            <connectionWD id="0" preCellId="../IT_L4/4/CELL_IT" postCellId="../IT_L6/15/CELL_IT" weight="0.000681" delay="8.7085001493 ms"/>
            <connectionWD id="1" preCellId="../IT_L4/4/CELL_IT" postCellId="../IT_L6/27/CELL_IT" weight="0.000681" delay="8.5509253701 ms"/>
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        </projection>
        <projection id="NetConn_SOM_L5_IT_L5B_GABAB" presynapticPopulation="SOM_L5" postsynapticPopulation="IT_L5B" synapse="GABAB">
            <connectionWD id="0" preCellId="../SOM_L5/2/CELL_SOM" postCellId="../IT_L5B/0/CELL_IT" weight="0.00015" delay="3.15141990144 ms"/>
            <connectionWD id="1" preCellId="../SOM_L5/3/CELL_SOM" postCellId="../IT_L5B/0/CELL_IT" weight="0.00015" delay="5.26449323181 ms"/>
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        </projection>
        <projection id="NetConn_IT_L6_IT_L23_AMPA" presynapticPopulation="IT_L6" postsynapticPopulation="IT_L23" synapse="AMPA">
            <connectionWD id="0" preCellId="../IT_L6/43/CELL_IT" postCellId="../IT_L23/3/CELL_IT" weight="0.000051" delay="8.68193459794 ms"/>
            <connectionWD id="1" preCellId="../IT_L6/29/CELL_IT" postCellId="../IT_L23/20/CELL_IT" weight="0.000078" delay="9.6163216604 ms"/>
            <connectionWD id="2" preCellId="../IT_L6/46/CELL_IT" postCellId="../IT_L23/87/CELL_IT" weight="0.000051" delay="8.39282472124 ms"/>
        </projection>
        <projection id="NetConn_IT_L4_IT_L4_AMPA" presynapticPopulation="IT_L4" postsynapticPopulation="IT_L4" synapse="AMPA">
            <connectionWD id="0" preCellId="../IT_L4/36/CELL_IT" postCellId="../IT_L4/0/CELL_IT" weight="0.000285" delay="2.29130589455 ms"/>
            <connectionWD id="1" preCellId="../IT_L4/37/CELL_IT" postCellId="../IT_L4/0/CELL_IT" weight="0.000285" delay="2.7630929764 ms"/>
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        </projection>
        <projection id="NetConn_IT_L5B_IT_L5B_AMPA" presynapticPopulation="IT_L5B" postsynapticPopulation="IT_L5B" synapse="AMPA">
            <connectionWD id="0" preCellId="../IT_L5B/13/CELL_IT" postCellId="../IT_L5B/0/CELL_IT" weight="0.000213" delay="2.56678239781 ms"/>
            <connectionWD id="1" preCellId="../IT_L5B/6/CELL_IT" postCellId="../IT_L5B/1/CELL_IT" weight="0.000213" delay="2.44522839201 ms"/>
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        </projection>
        <projection id="NetConn_IT_L5A_PV_L5_AMPA" presynapticPopulation="IT_L5A" postsynapticPopulation="PV_L5" synapse="AMPA">
            <connectionWD id="0" preCellId="../IT_L5A/19/CELL_IT" postCellId="../PV_L5/0/CELL_PV" weight="0.00032325" delay="2.43590819407 ms"/>
            <connectionWD id="1" preCellId="../IT_L5A/24/CELL_IT" postCellId="../PV_L5/0/CELL_PV" weight="0.00032325" delay="2.48317135492 ms"/>
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        </projection>
        <projection id="NetConn_CT_L6_IT_L5A_AMPA" presynapticPopulation="CT_L6" postsynapticPopulation="IT_L5A" synapse="AMPA">
            <connectionWD id="0" preCellId="../CT_L6/44/CELL_CT" postCellId="../IT_L5A/0/CELL_IT" weight="0.000048" delay="6.28205123245 ms"/>
            <connectionWD id="1" preCellId="../CT_L6/3/CELL_CT" postCellId="../IT_L5A/0/CELL_IT" weight="0.000024" delay="6.46545017818 ms"/>
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        </projection>
        <projection id="NetConn_PT_L5B_PV_L6_AMPA" presynapticPopulation="PT_L5B" postsynapticPopulation="PV_L6" synapse="AMPA">
            <connectionWD id="0" preCellId="../PT_L5B/57/CELL_PT" postCellId="../PV_L6/1/CELL_PV" weight="0.00013125" delay="6.03397339469 ms"/>
            <connectionWD id="1" preCellId="../PT_L5B/28/CELL_PT" postCellId="../PV_L6/2/CELL_PV" weight="0.00013125" delay="3.83993054962 ms"/>
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        </projection>
        <projection id="NetConn_SOM_L5_PT_L5B_GABAB" presynapticPopulation="SOM_L5" postsynapticPopulation="PT_L5B" synapse="GABAB">
            <connectionWD id="0" preCellId="../SOM_L5/0/CELL_SOM" postCellId="../PT_L5B/0/CELL_PT" weight="0.00015" delay="3.02024000945 ms"/>
            <connectionWD id="1" preCellId="../SOM_L5/2/CELL_SOM" postCellId="../PT_L5B/0/CELL_PT" weight="0.00015" delay="4.6390632025 ms"/>
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        </projection>
        <projection id="NetConn_SOM_L23_SOM_L23_GABAB" presynapticPopulation="SOM_L23" postsynapticPopulation="SOM_L23" synapse="GABAB">
            <connectionWD id="0" preCellId="../SOM_L23/2/CELL_SOM" postCellId="../SOM_L23/0/CELL_SOM" weight="0.00015" delay="3.64592892982 ms"/>
            <connectionWD id="1" preCellId="../SOM_L23/5/CELL_SOM" postCellId="../SOM_L23/0/CELL_SOM" weight="0.00015" delay="3.24141652815 ms"/>
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        </projection>
        <projection id="NetConn_IT_L4_IT_L23_AMPA" presynapticPopulation="IT_L4" postsynapticPopulation="IT_L23" synapse="AMPA">
            <connectionWD id="0" preCellId="../IT_L4/44/CELL_IT" postCellId="../IT_L23/0/CELL_IT" weight="0.000294" delay="5.04028743769 ms"/>
            <connectionWD id="1" preCellId="../IT_L4/26/CELL_IT" postCellId="../IT_L23/0/CELL_IT" weight="0.000294" delay="3.92559795813 ms"/>
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        </projection>
        <projection id="NetConn_IT_L6_SOM_L6_AMPA" presynapticPopulation="IT_L6" postsynapticPopulation="SOM_L6" synapse="AMPA">
            <connectionWD id="0" preCellId="../IT_L6/12/CELL_IT" postCellId="../SOM_L6/0/CELL_SOM" weight="0.000159" delay="2.19769923044 ms"/>
            <connectionWD id="1" preCellId="../IT_L6/52/CELL_IT" postCellId="../SOM_L6/1/CELL_SOM" weight="0.000159" delay="3.47692862783 ms"/>
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        </projection>
        <projection id="NetConn_IT_L5A_PV_L6_AMPA" presynapticPopulation="IT_L5A" postsynapticPopulation="PV_L6" synapse="AMPA">
            <connectionWD id="0" preCellId="../IT_L5A/23/CELL_IT" postCellId="../PV_L6/0/CELL_PV" weight="0.00013125" delay="9.06096519176 ms"/>
            <connectionWD id="1" preCellId="../IT_L5A/46/CELL_IT" postCellId="../PV_L6/2/CELL_PV" weight="0.00013125" delay="7.70970734109 ms"/>
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        </projection>
        <projection id="NetConn_IT_L23_IT_L4_AMPA" presynapticPopulation="IT_L23" postsynapticPopulation="IT_L4" synapse="AMPA">
            <connectionWD id="0" preCellId="../IT_L23/5/CELL_IT" postCellId="../IT_L4/0/CELL_IT" weight="0.000093" delay="4.65367902855 ms"/>
            <connectionWD id="1" preCellId="../IT_L23/11/CELL_IT" postCellId="../IT_L4/0/CELL_IT" weight="0.000093" delay="4.48527897275 ms"/>
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        </projection>
        <projection id="NetConn_IT_L5A_IT_L5A_AMPA" presynapticPopulation="IT_L5A" postsynapticPopulation="IT_L5A" synapse="AMPA">
            <connectionWD id="0" preCellId="../IT_L5A/12/CELL_IT" postCellId="../IT_L5A/0/CELL_IT" weight="0.000198" delay="2.35993128923 ms"/>
            <connectionWD id="1" preCellId="../IT_L5A/42/CELL_IT" postCellId="../IT_L5A/0/CELL_IT" weight="0.000198" delay="2.46222047926 ms"/>
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        </projection>
        <projection id="NetConn_CT_L6_SOM_L6_AMPA" presynapticPopulation="CT_L6" postsynapticPopulation="SOM_L6" synapse="AMPA">
            <connectionWD id="0" preCellId="../CT_L6/52/CELL_CT" postCellId="../SOM_L6/1/CELL_SOM" weight="0.000159" delay="3.02846028885 ms"/>
            <connectionWD id="1" preCellId="../CT_L6/6/CELL_CT" postCellId="../SOM_L6/2/CELL_SOM" weight="0.000159" delay="2.36018050935 ms"/>
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        </projection>
        <projection id="NetConn_IT_L5B_IT_L23_AMPA" presynapticPopulation="IT_L5B" postsynapticPopulation="IT_L23" synapse="AMPA">
            <connectionWD id="0" preCellId="../IT_L5B/54/CELL_IT" postCellId="../IT_L23/0/CELL_IT" weight="0.000063" delay="7.10723482534 ms"/>
            <connectionWD id="1" preCellId="../IT_L5B/13/CELL_IT" postCellId="../IT_L23/1/CELL_IT" weight="0.000078" delay="7.77984944116 ms"/>
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        </projection>
        <projection id="NetConn_IT_L5B_IT_L4_AMPA" presynapticPopulation="IT_L5B" postsynapticPopulation="IT_L4" synapse="AMPA">
            <connectionWD id="0" preCellId="../IT_L5B/58/CELL_IT" postCellId="../IT_L4/0/CELL_IT" weight="0.000051" delay="5.14985590829 ms"/>
            <connectionWD id="1" preCellId="../IT_L5B/53/CELL_IT" postCellId="../IT_L4/0/CELL_IT" weight="0.000051" delay="5.8223618032 ms"/>
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        </projection>
        <projection id="NetConn_CT_L6_PV_L5_AMPA" presynapticPopulation="CT_L6" postsynapticPopulation="PV_L5" synapse="AMPA">
            <connectionWD id="0" preCellId="../CT_L6/3/CELL_CT" postCellId="../PV_L5/0/CELL_PV" weight="0.000074358" delay="7.05701289403 ms"/>
            <connectionWD id="1" preCellId="../CT_L6/7/CELL_CT" postCellId="../PV_L5/1/CELL_PV" weight="0.000074358" delay="9.94061457314 ms"/>
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        </projection>
        <projection id="NetConn_PT_L5B_PV_L5_AMPA" presynapticPopulation="PT_L5B" postsynapticPopulation="PV_L5" synapse="AMPA">
            <connectionWD id="0" preCellId="../PT_L5B/0/CELL_PT" postCellId="../PV_L5/0/CELL_PV" weight="0.00032325" delay="6.13469896037 ms"/>
            <connectionWD id="1" preCellId="../PT_L5B/4/CELL_PT" postCellId="../PV_L5/0/CELL_PV" weight="0.00032325" delay="3.57479788301 ms"/>
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        </projection>
        <projection id="NetConn_IT_L5A_SOM_L23_AMPA" presynapticPopulation="IT_L5A" postsynapticPopulation="SOM_L23" synapse="AMPA">
            <connectionWD id="0" preCellId="../IT_L5A/47/CELL_IT" postCellId="../SOM_L23/2/CELL_SOM" weight="0.00010875" delay="4.26034794874 ms"/>
            <connectionWD id="1" preCellId="../IT_L5A/29/CELL_IT" postCellId="../SOM_L23/3/CELL_SOM" weight="0.00010875" delay="6.93912534452 ms"/>
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        </projection>
        <projection id="NetConn_PT_L5B_IT_L6_AMPA" presynapticPopulation="PT_L5B" postsynapticPopulation="IT_L6" synapse="AMPA">
            <connectionWD id="0" preCellId="../PT_L5B/17/CELL_PT" postCellId="../IT_L6/13/CELL_IT" weight="0.00015225" delay="2.55128559133 ms"/>
            <connectionWD id="1" preCellId="../PT_L5B/2/CELL_PT" postCellId="../IT_L6/16/CELL_IT" weight="0.00015225" delay="2.47424942586 ms"/>
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        </projection>
        <projection id="NetConn_IT_L6_PV_L5_AMPA" presynapticPopulation="IT_L6" postsynapticPopulation="PV_L5" synapse="AMPA">
            <connectionWD id="0" preCellId="../IT_L6/19/CELL_IT" postCellId="../PV_L5/0/CELL_PV" weight="0.000074358" delay="9.26880358661 ms"/>
            <connectionWD id="1" preCellId="../IT_L6/43/CELL_IT" postCellId="../PV_L5/0/CELL_PV" weight="0.000074358" delay="6.72201644937 ms"/>
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        </projection>
        <projection id="NetConn_CT_L6_SOM_L5_AMPA" presynapticPopulation="CT_L6" postsynapticPopulation="SOM_L5" synapse="AMPA">
            <connectionWD id="0" preCellId="../CT_L6/17/CELL_CT" postCellId="../SOM_L5/0/CELL_SOM" weight="0.000074358" delay="5.44246788992 ms"/>
            <connectionWD id="1" preCellId="../CT_L6/23/CELL_CT" postCellId="../SOM_L5/0/CELL_SOM" weight="0.000074358" delay="3.39642208887 ms"/>
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        </projection>
        <projection id="NetConn_IT_L6_CT_L6_AMPA" presynapticPopulation="IT_L6" postsynapticPopulation="CT_L6" synapse="AMPA">
            <connectionWD id="0" preCellId="../IT_L6/2/CELL_IT" postCellId="../CT_L6/0/CELL_CT" weight="0.000159" delay="2.36977076199 ms"/>
            <connectionWD id="1" preCellId="../IT_L6/36/CELL_IT" postCellId="../CT_L6/1/CELL_CT" weight="0.000159" delay="3.19106799758 ms"/>
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        </projection>
        <projection id="NetConn_SOM_L5_PV_L5_GABAB" presynapticPopulation="SOM_L5" postsynapticPopulation="PV_L5" synapse="GABAB">
            <connectionWD id="0" preCellId="../SOM_L5/1/CELL_SOM" postCellId="../PV_L5/0/CELL_PV" weight="0.00015" delay="2.32396370485 ms"/>
            <connectionWD id="1" preCellId="../SOM_L5/6/CELL_SOM" postCellId="../PV_L5/0/CELL_PV" weight="0.00015" delay="3.82591270709 ms"/>
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        </projection>
        <projection id="NetConn_SOM_L5_IT_L4_GABAB" presynapticPopulation="SOM_L5" postsynapticPopulation="IT_L4" synapse="GABAB">
            <connectionWD id="0" preCellId="../SOM_L5/6/CELL_SOM" postCellId="../IT_L4/0/CELL_IT" weight="0.00015" delay="2.789274995 ms"/>
            <connectionWD id="1" preCellId="../SOM_L5/7/CELL_SOM" postCellId="../IT_L4/0/CELL_IT" weight="0.00015" delay="2.70930717421 ms"/>
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        </projection>
        <projection id="NetConn_IT_L5A_IT_L5B_AMPA" presynapticPopulation="IT_L5A" postsynapticPopulation="IT_L5B" synapse="AMPA">
            <connectionWD id="0" preCellId="../IT_L5A/25/CELL_IT" postCellId="../IT_L5B/0/CELL_IT" weight="0.000264" delay="4.13766674277 ms"/>
            <connectionWD id="1" preCellId="../IT_L5A/27/CELL_IT" postCellId="../IT_L5B/1/CELL_IT" weight="0.000264" delay="5.30642741802 ms"/>
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        </projection>
        <projection id="NetConn_PV_L23_PV_L23_GABAA" presynapticPopulation="PV_L23" postsynapticPopulation="PV_L23" synapse="GABAA">
            <connectionWD id="0" preCellId="../PV_L23/1/CELL_PV" postCellId="../PV_L23/0/CELL_PV" weight="0.00015" delay="3.41239381082 ms"/>
            <connectionWD id="1" preCellId="../PV_L23/6/CELL_PV" postCellId="../PV_L23/0/CELL_PV" weight="0.00015" delay="2.38402896535 ms"/>
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        </projection>
        <projection id="NetConn_IT_L4_IT_L5A_AMPA" presynapticPopulation="IT_L4" postsynapticPopulation="IT_L5A" synapse="AMPA">
            <connectionWD id="0" preCellId="../IT_L4/13/CELL_IT" postCellId="../IT_L5A/0/CELL_IT" weight="0.000162" delay="3.83724200388 ms"/>
            <connectionWD id="1" preCellId="../IT_L4/36/CELL_IT" postCellId="../IT_L5A/1/CELL_IT" weight="0.0002235" delay="3.0562562233 ms"/>
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        </projection>
        <projection id="NetConn_IT_L23_IT_L5A_AMPA" presynapticPopulation="IT_L23" postsynapticPopulation="IT_L5A" synapse="AMPA">
            <connectionWD id="0" preCellId="../IT_L23/47/CELL_IT" postCellId="../IT_L5A/0/CELL_IT" weight="0.000165" delay="6.29969885413 ms"/>
            <connectionWD id="1" preCellId="../IT_L23/21/CELL_IT" postCellId="../IT_L5A/0/CELL_IT" weight="0.000279" delay="5.46729993807 ms"/>
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        </projection>
        <projection id="NetConn_SOM_L5_IT_L5A_GABAB" presynapticPopulation="SOM_L5" postsynapticPopulation="IT_L5A" synapse="GABAB">
            <connectionWD id="0" preCellId="../SOM_L5/3/CELL_SOM" postCellId="../IT_L5A/0/CELL_IT" weight="0.00015" delay="3.18710684604 ms"/>
            <connectionWD id="1" preCellId="../SOM_L5/6/CELL_SOM" postCellId="../IT_L5A/0/CELL_IT" weight="0.00015" delay="4.4288501758 ms"/>
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        </projection>
        <projection id="NetConn_IT_L6_IT_L5A_AMPA" presynapticPopulation="IT_L6" postsynapticPopulation="IT_L5A" synapse="AMPA">
            <connectionWD id="0" preCellId="../IT_L6/8/CELL_IT" postCellId="../IT_L5A/0/CELL_IT" weight="0.000024" delay="6.49885731351 ms"/>
            <connectionWD id="1" preCellId="../IT_L6/34/CELL_IT" postCellId="../IT_L5A/1/CELL_IT" weight="0.00003675" delay="6.60039041687 ms"/>
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        </projection>
        <projection id="NetConn_IT_L5B_PV_L23_AMPA" presynapticPopulation="IT_L5B" postsynapticPopulation="PV_L23" synapse="AMPA">
            <connectionWD id="0" preCellId="../IT_L5B/13/CELL_IT" postCellId="../PV_L23/3/CELL_PV" weight="0.00010875" delay="8.14513058148 ms"/>
            <connectionWD id="1" preCellId="../IT_L5B/11/CELL_IT" postCellId="../PV_L23/7/CELL_PV" weight="0.00010875" delay="6.10688003443 ms"/>
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        </projection>
        <projection id="NetConn_CT_L6_PV_L6_AMPA" presynapticPopulation="CT_L6" postsynapticPopulation="PV_L6" synapse="AMPA">
            <connectionWD id="0" preCellId="../CT_L6/4/CELL_CT" postCellId="../PV_L6/0/CELL_PV" weight="0.000159" delay="2.70465830642 ms"/>
            <connectionWD id="1" preCellId="../CT_L6/10/CELL_CT" postCellId="../PV_L6/0/CELL_PV" weight="0.000159" delay="4.03571374541 ms"/>
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        </projection>
        <projection id="NetConn_SOM_L23_PV_L23_GABAB" presynapticPopulation="SOM_L23" postsynapticPopulation="PV_L23" synapse="GABAB">
            <connectionWD id="0" preCellId="../SOM_L23/1/CELL_SOM" postCellId="../PV_L23/0/CELL_PV" weight="0.00015" delay="2.63736926213 ms"/>
            <connectionWD id="1" preCellId="../SOM_L23/5/CELL_SOM" postCellId="../PV_L23/0/CELL_PV" weight="0.00015" delay="3.02669448402 ms"/>
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        </projection>
        <projection id="NetConn_IT_L5B_IT_L5A_AMPA" presynapticPopulation="IT_L5B" postsynapticPopulation="IT_L5A" synapse="AMPA">
            <connectionWD id="0" preCellId="../IT_L5B/3/CELL_IT" postCellId="../IT_L5A/0/CELL_IT" weight="0.000072" delay="3.15733412516 ms"/>
            <connectionWD id="1" preCellId="../IT_L5B/6/CELL_IT" postCellId="../IT_L5A/0/CELL_IT" weight="0.000072" delay="4.24320896779 ms"/>
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        </projection>
        <projection id="NetConn_IT_L4_PV_L23_AMPA" presynapticPopulation="IT_L4" postsynapticPopulation="PV_L23" synapse="AMPA">
            <connectionWD id="0" preCellId="../IT_L4/2/CELL_IT" postCellId="../PV_L23/0/CELL_PV" weight="0.00010875" delay="3.5369410085 ms"/>
            <connectionWD id="1" preCellId="../IT_L4/20/CELL_IT" postCellId="../PV_L23/1/CELL_PV" weight="0.00010875" delay="5.3549656576 ms"/>
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        </projection>
        <projection id="NetConn_IT_L4_SOM_L6_AMPA" presynapticPopulation="IT_L4" postsynapticPopulation="SOM_L6" synapse="AMPA">
            <connectionWD id="0" preCellId="../IT_L4/39/CELL_IT" postCellId="../SOM_L6/3/CELL_SOM" weight="0.00013125" delay="11.0507376887 ms"/>
            <connectionWD id="1" preCellId="../IT_L4/18/CELL_IT" postCellId="../SOM_L6/5/CELL_SOM" weight="0.00013125" delay="10.7147537281 ms"/>
            <connectionWD id="2" preCellId="../IT_L4/46/CELL_IT" postCellId="../SOM_L6/6/CELL_SOM" weight="0.00013125" delay="7.20485554968 ms"/>
        </projection>
        <projection id="NetConn_IT_L5B_PV_L5_AMPA" presynapticPopulation="IT_L5B" postsynapticPopulation="PV_L5" synapse="AMPA">
            <connectionWD id="0" preCellId="../IT_L5B/2/CELL_IT" postCellId="../PV_L5/0/CELL_PV" weight="0.00032325" delay="5.98874462853 ms"/>
            <connectionWD id="1" preCellId="../IT_L5B/13/CELL_IT" postCellId="../PV_L5/0/CELL_PV" weight="0.00032325" delay="5.18272877716 ms"/>
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        </projection>
        <projection id="NetConn_IT_L4_PV_L5_AMPA" presynapticPopulation="IT_L4" postsynapticPopulation="PV_L5" synapse="AMPA">
            <connectionWD id="0" preCellId="../IT_L4/2/CELL_IT" postCellId="../PV_L5/0/CELL_PV" weight="0.00032325" delay="3.79451923484 ms"/>
            <connectionWD id="1" preCellId="../IT_L4/4/CELL_IT" postCellId="../PV_L5/0/CELL_PV" weight="0.00032325" delay="3.42680621688 ms"/>
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        </projection>
        <projection id="NetConn_IT_L5B_IT_L6_AMPA" presynapticPopulation="IT_L5B" postsynapticPopulation="IT_L6" synapse="AMPA">
            <connectionWD id="0" preCellId="../IT_L5B/12/CELL_IT" postCellId="../IT_L6/3/CELL_IT" weight="0.000147" delay="5.1314418444 ms"/>
            <connectionWD id="1" preCellId="../IT_L5B/55/CELL_IT" postCellId="../IT_L6/3/CELL_IT" weight="0.000147" delay="3.76492557996 ms"/>
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        </projection>
        <projection id="NetConn_IT_L23_IT_L23_AMPA" presynapticPopulation="IT_L23" postsynapticPopulation="IT_L23" synapse="AMPA">
            <connectionWD id="0" preCellId="../IT_L23/25/CELL_IT" postCellId="../IT_L23/0/CELL_IT" weight="0.000192" delay="2.40733460697 ms"/>
            <connectionWD id="1" preCellId="../IT_L23/27/CELL_IT" postCellId="../IT_L23/0/CELL_IT" weight="0.000192" delay="2.71542492721 ms"/>
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        </projection>
        <projection id="NetConn_PV_L23_SOM_L23_GABAA" presynapticPopulation="PV_L23" postsynapticPopulation="SOM_L23" synapse="GABAA">
            <connectionWD id="0" preCellId="../PV_L23/0/CELL_PV" postCellId="../SOM_L23/0/CELL_SOM" weight="0.00015" delay="2.6518828688 ms"/>
            <connectionWD id="1" preCellId="../PV_L23/7/CELL_PV" postCellId="../SOM_L23/0/CELL_SOM" weight="0.00015" delay="2.64341783738 ms"/>
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        </projection>
        <projection id="NetConn_CT_L6_IT_L6_AMPA" presynapticPopulation="CT_L6" postsynapticPopulation="IT_L6" synapse="AMPA">
            <connectionWD id="0" preCellId="../CT_L6/44/CELL_CT" postCellId="../IT_L6/1/CELL_IT" weight="0.000159" delay="4.46216966848 ms"/>
            <connectionWD id="1" preCellId="../CT_L6/24/CELL_CT" postCellId="../IT_L6/1/CELL_IT" weight="0.000159" delay="3.23433434752 ms"/>
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        </projection>
        <projection id="NetConn_SOM_L6_IT_L6_GABAB" presynapticPopulation="SOM_L6" postsynapticPopulation="IT_L6" synapse="GABAB">
            <connectionWD id="0" preCellId="../SOM_L6/2/CELL_SOM" postCellId="../IT_L6/0/CELL_IT" weight="0.00015" delay="3.81327912792 ms"/>
            <connectionWD id="1" preCellId="../SOM_L6/4/CELL_SOM" postCellId="../IT_L6/0/CELL_IT" weight="0.00015" delay="2.65193587641 ms"/>
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        </projection>
        <projection id="NetConn_IT_L4_SOM_L5_AMPA" presynapticPopulation="IT_L4" postsynapticPopulation="SOM_L5" synapse="AMPA">
            <connectionWD id="0" preCellId="../IT_L4/38/CELL_IT" postCellId="../SOM_L5/0/CELL_SOM" weight="0.00003675" delay="6.74588229391 ms"/>
            <connectionWD id="1" preCellId="../IT_L4/40/CELL_IT" postCellId="../SOM_L5/0/CELL_SOM" weight="0.00003675" delay="6.72865395189 ms"/>
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        </projection>
        <projection id="NetConn_PT_L5B_IT_L5A_AMPA" presynapticPopulation="PT_L5B" postsynapticPopulation="IT_L5A" synapse="AMPA">
            <connectionWD id="0" preCellId="../PT_L5B/4/CELL_PT" postCellId="../IT_L5A/0/CELL_IT" weight="0.000072" delay="2.97845008652 ms"/>
            <connectionWD id="1" preCellId="../PT_L5B/49/CELL_PT" postCellId="../IT_L5A/0/CELL_IT" weight="0.000072" delay="4.94151535243 ms"/>
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        </projection>
        <projection id="NetConn_IT_L5B_PT_L5B_AMPA" presynapticPopulation="IT_L5B" postsynapticPopulation="PT_L5B" synapse="AMPA">
            <connectionWD id="0" preCellId="../IT_L5B/26/CELL_IT" postCellId="../PT_L5B/0/CELL_PT" weight="0.00018" delay="3.15602380889 ms"/>
            <connectionWD id="1" preCellId="../IT_L5B/28/CELL_IT" postCellId="../PT_L5B/0/CELL_PT" weight="0.00018" delay="3.21296383835 ms"/>
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        </projection>
        <projection id="NetConn_PV_L5_PV_L5_GABAA" presynapticPopulation="PV_L5" postsynapticPopulation="PV_L5" synapse="GABAA">
            <connectionWD id="0" preCellId="../PV_L5/1/CELL_PV" postCellId="../PV_L5/0/CELL_PV" weight="0.00015" delay="3.85132683699 ms"/>
            <connectionWD id="1" preCellId="../PV_L5/11/CELL_PV" postCellId="../PV_L5/0/CELL_PV" weight="0.00015" delay="2.35866382693 ms"/>
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        </projection>
        <projection id="NetConn_IT_L23_SOM_L23_AMPA" presynapticPopulation="IT_L23" postsynapticPopulation="SOM_L23" synapse="AMPA">
            <connectionWD id="0" preCellId="../IT_L23/2/CELL_IT" postCellId="../SOM_L23/0/CELL_SOM" weight="0.000234" delay="3.70248424753 ms"/>
            <connectionWD id="1" preCellId="../IT_L23/3/CELL_IT" postCellId="../SOM_L23/0/CELL_SOM" weight="0.000234" delay="3.62326623696 ms"/>
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        </projection>
        <projection id="NetConn_PT_L5B_PV_L23_AMPA" presynapticPopulation="PT_L5B" postsynapticPopulation="PV_L23" synapse="AMPA">
            <connectionWD id="0" preCellId="../PT_L5B/19/CELL_PT" postCellId="../PV_L23/0/CELL_PV" weight="0.00010875" delay="7.61868138029 ms"/>
            <connectionWD id="1" preCellId="../PT_L5B/32/CELL_PT" postCellId="../PV_L23/1/CELL_PV" weight="0.00010875" delay="7.76957512861 ms"/>
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        </projection>
        <projection id="NetConn_PT_L5B_SOM_L5_AMPA" presynapticPopulation="PT_L5B" postsynapticPopulation="SOM_L5" synapse="AMPA">
            <connectionWD id="0" preCellId="../PT_L5B/4/CELL_PT" postCellId="../SOM_L5/0/CELL_SOM" weight="0.00003675" delay="3.71173180653 ms"/>
            <connectionWD id="1" preCellId="../PT_L5B/9/CELL_PT" postCellId="../SOM_L5/0/CELL_SOM" weight="0.00003675" delay="2.45695306707 ms"/>
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        </projection>
        <projection id="NetConn_IT_L6_PT_L5B_AMPA" presynapticPopulation="IT_L6" postsynapticPopulation="PT_L5B" synapse="AMPA">
            <connectionWD id="0" preCellId="../IT_L6/28/CELL_IT" postCellId="../PT_L5B/0/CELL_PT" weight="0.00015225" delay="2.67097566135 ms"/>
            <connectionWD id="1" preCellId="../IT_L6/34/CELL_IT" postCellId="../PT_L5B/0/CELL_PT" weight="0.00015225" delay="2.30372531321 ms"/>
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        </projection>
        <projection id="NetConn_IT_L4_PV_L6_AMPA" presynapticPopulation="IT_L4" postsynapticPopulation="PV_L6" synapse="AMPA">
            <connectionWD id="0" preCellId="../IT_L4/36/CELL_IT" postCellId="../PV_L6/0/CELL_PV" weight="0.00013125" delay="10.0340590934 ms"/>
            <connectionWD id="1" preCellId="../IT_L4/17/CELL_IT" postCellId="../PV_L6/1/CELL_PV" weight="0.00013125" delay="8.88400576621 ms"/>
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        </projection>
        <projection id="NetConn_IT_L23_PT_L5B_AMPA" presynapticPopulation="IT_L23" postsynapticPopulation="PT_L5B" synapse="AMPA">
            <connectionWD id="0" preCellId="../IT_L23/6/CELL_IT" postCellId="../PT_L5B/1/CELL_PT" weight="0.000066" delay="7.42119802946 ms"/>
            <connectionWD id="1" preCellId="../IT_L23/15/CELL_IT" postCellId="../PT_L5B/1/CELL_PT" weight="0.000066" delay="7.81247762855 ms"/>
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        </projection>
        <projection id="NetConn_IT_L5A_IT_L4_AMPA" presynapticPopulation="IT_L5A" postsynapticPopulation="IT_L4" synapse="AMPA">
            <connectionWD id="0" preCellId="../IT_L5A/3/CELL_IT" postCellId="../IT_L4/0/CELL_IT" weight="0.000144" delay="3.15106402275 ms"/>
            <connectionWD id="1" preCellId="../IT_L5A/51/CELL_IT" postCellId="../IT_L4/0/CELL_IT" weight="0.0002145" delay="2.7552288877 ms"/>
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        </projection>
        <projection id="NetConn_IT_L5A_SOM_L6_AMPA" presynapticPopulation="IT_L5A" postsynapticPopulation="SOM_L6" synapse="AMPA">
            <connectionWD id="0" preCellId="../IT_L5A/48/CELL_IT" postCellId="../SOM_L6/0/CELL_SOM" weight="0.00013125" delay="9.07821524664 ms"/>
            <connectionWD id="1" preCellId="../IT_L5A/35/CELL_IT" postCellId="../SOM_L6/1/CELL_SOM" weight="0.00013125" delay="9.04372651433 ms"/>
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        </projection>
        <projection id="NetConn_PT_L5B_PT_L5B_AMPA" presynapticPopulation="PT_L5B" postsynapticPopulation="PT_L5B" synapse="AMPA">
            <connectionWD id="0" preCellId="../PT_L5B/42/CELL_PT" postCellId="../PT_L5B/0/CELL_PT" weight="0.00018" delay="2.7242461401 ms"/>
            <connectionWD id="1" preCellId="../PT_L5B/49/CELL_PT" postCellId="../PT_L5B/0/CELL_PT" weight="0.00018" delay="2.66167030047 ms"/>
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        </projection>
        <projection id="NetConn_CT_L6_PT_L5B_AMPA" presynapticPopulation="CT_L6" postsynapticPopulation="PT_L5B" synapse="AMPA">
            <connectionWD id="0" preCellId="../CT_L6/9/CELL_CT" postCellId="../PT_L5B/0/CELL_PT" weight="0.0001245" delay="4.42297379635 ms"/>
            <connectionWD id="1" preCellId="../CT_L6/27/CELL_CT" postCellId="../PT_L5B/1/CELL_PT" weight="0.00009" delay="5.94412952712 ms"/>
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        </projection>
        <projection id="NetConn_IT_L6_IT_L6_AMPA" presynapticPopulation="IT_L6" postsynapticPopulation="IT_L6" synapse="AMPA">
            <connectionWD id="0" preCellId="../IT_L6/41/CELL_IT" postCellId="../IT_L6/0/CELL_IT" weight="0.00015225" delay="2.39878790174 ms"/>
            <connectionWD id="1" preCellId="../IT_L6/23/CELL_IT" postCellId="../IT_L6/2/CELL_IT" weight="0.000159" delay="3.57448911581 ms"/>
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        </projection>
        <projection id="NetConn_CT_L6_IT_L5B_AMPA" presynapticPopulation="CT_L6" postsynapticPopulation="IT_L5B" synapse="AMPA">
            <connectionWD id="0" preCellId="../CT_L6/36/CELL_CT" postCellId="../IT_L5B/1/CELL_IT" weight="0.00009" delay="5.13055780981 ms"/>
            <connectionWD id="1" preCellId="../CT_L6/50/CELL_CT" postCellId="../IT_L5B/2/CELL_IT" weight="0.00009" delay="4.5505162181 ms"/>
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        </projection>
        <projection id="NetConn_PV_L23_IT_L23_GABAA" presynapticPopulation="PV_L23" postsynapticPopulation="IT_L23" synapse="GABAA">
            <connectionWD id="0" preCellId="../PV_L23/2/CELL_PV" postCellId="../IT_L23/0/CELL_IT" weight="0.00015" delay="3.79110112807 ms"/>
            <connectionWD id="1" preCellId="../PV_L23/3/CELL_PV" postCellId="../IT_L23/0/CELL_IT" weight="0.00015" delay="2.8964587018 ms"/>
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        </projection>
        <projection id="NetConn_PV_L6_CT_L6_GABAA" presynapticPopulation="PV_L6" postsynapticPopulation="CT_L6" synapse="GABAA">
            <connectionWD id="0" preCellId="../PV_L6/11/CELL_PV" postCellId="../CT_L6/0/CELL_CT" weight="0.00015" delay="2.50112810999 ms"/>
            <connectionWD id="1" preCellId="../PV_L6/0/CELL_PV" postCellId="../CT_L6/0/CELL_CT" weight="0.00015" delay="2.62200893111 ms"/>
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        </projection>
        <projection id="NetConn_PT_L5B_SOM_L6_AMPA" presynapticPopulation="PT_L5B" postsynapticPopulation="SOM_L6" synapse="AMPA">
            <connectionWD id="0" preCellId="../PT_L5B/25/CELL_PT" postCellId="../SOM_L6/0/CELL_SOM" weight="0.00013125" delay="4.60279963698 ms"/>
            <connectionWD id="1" preCellId="../PT_L5B/16/CELL_PT" postCellId="../SOM_L6/1/CELL_SOM" weight="0.00013125" delay="6.51523282163 ms"/>
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        </projection>
        <projection id="NetConn_PV_L5_IT_L5B_GABAA" presynapticPopulation="PV_L5" postsynapticPopulation="IT_L5B" synapse="GABAA">
            <connectionWD id="0" preCellId="../PV_L5/2/CELL_PV" postCellId="../IT_L5B/0/CELL_IT" weight="0.00015" delay="2.50127974314 ms"/>
            <connectionWD id="1" preCellId="../PV_L5/4/CELL_PV" postCellId="../IT_L5B/0/CELL_IT" weight="0.00015" delay="3.83345766186 ms"/>
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        </projection>
        <projection id="NetConn_IT_L5A_CT_L6_AMPA" presynapticPopulation="IT_L5A" postsynapticPopulation="CT_L6" synapse="AMPA">
            <connectionWD id="0" preCellId="../IT_L5A/27/CELL_IT" postCellId="../CT_L6/1/CELL_CT" weight="0.000084" delay="6.94628796437 ms"/>
            <connectionWD id="1" preCellId="../IT_L5A/52/CELL_IT" postCellId="../CT_L6/7/CELL_CT" weight="0.000084" delay="8.5870976405 ms"/>
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        </projection>
        <projection id="NetConn_IT_L6_PV_L6_AMPA" presynapticPopulation="IT_L6" postsynapticPopulation="PV_L6" synapse="AMPA">
            <connectionWD id="0" preCellId="../IT_L6/51/CELL_IT" postCellId="../PV_L6/1/CELL_PV" weight="0.000159" delay="3.05958792221 ms"/>
            <connectionWD id="1" preCellId="../IT_L6/13/CELL_IT" postCellId="../PV_L6/2/CELL_PV" weight="0.000159" delay="3.24567524709 ms"/>
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        </projection>
        <projection id="NetConn_IT_L5B_SOM_L23_AMPA" presynapticPopulation="IT_L5B" postsynapticPopulation="SOM_L23" synapse="AMPA">
            <connectionWD id="0" preCellId="../IT_L5B/45/CELL_IT" postCellId="../SOM_L23/1/CELL_SOM" weight="0.00010875" delay="8.05635837721 ms"/>
            <connectionWD id="1" preCellId="../IT_L5B/55/CELL_IT" postCellId="../SOM_L23/1/CELL_SOM" weight="0.00010875" delay="8.68539737715 ms"/>
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        </projection>
        <projection id="NetConn_CT_L6_IT_L4_AMPA" presynapticPopulation="CT_L6" postsynapticPopulation="IT_L4" synapse="AMPA">
            <connectionWD id="0" preCellId="../CT_L6/33/CELL_CT" postCellId="../IT_L4/0/CELL_IT" weight="0.0000255" delay="7.98196038979 ms"/>
            <connectionWD id="1" preCellId="../CT_L6/20/CELL_CT" postCellId="../IT_L4/4/CELL_IT" weight="0.0000255" delay="8.09090697248 ms"/>
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        </projection>
        <projection id="NetConn_IT_L5A_PV_L23_AMPA" presynapticPopulation="IT_L5A" postsynapticPopulation="PV_L23" synapse="AMPA">
            <connectionWD id="0" preCellId="../IT_L5A/28/CELL_IT" postCellId="../PV_L23/4/CELL_PV" weight="0.00010875" delay="6.16781123883 ms"/>
            <connectionWD id="1" preCellId="../IT_L5A/43/CELL_IT" postCellId="../PV_L23/5/CELL_PV" weight="0.00010875" delay="6.2579273435 ms"/>
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        </projection>
        <projection id="NetConn_SOM_L6_CT_L6_GABAB" presynapticPopulation="SOM_L6" postsynapticPopulation="CT_L6" synapse="GABAB">
            <connectionWD id="0" preCellId="../SOM_L6/0/CELL_SOM" postCellId="../CT_L6/0/CELL_CT" weight="0.00015" delay="2.41961683606 ms"/>
            <connectionWD id="1" preCellId="../SOM_L6/2/CELL_SOM" postCellId="../CT_L6/0/CELL_CT" weight="0.00015" delay="2.4066716462 ms"/>
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        </projection>
        <projection id="NetConn_IT_L5B_SOM_L6_AMPA" presynapticPopulation="IT_L5B" postsynapticPopulation="SOM_L6" synapse="AMPA">
            <connectionWD id="0" preCellId="../IT_L5B/11/CELL_IT" postCellId="../SOM_L6/0/CELL_SOM" weight="0.00013125" delay="7.65681579984 ms"/>
            <connectionWD id="1" preCellId="../IT_L5B/22/CELL_IT" postCellId="../SOM_L6/1/CELL_SOM" weight="0.00013125" delay="8.27869357363 ms"/>
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        </projection>
        <projection id="NetConn_IT_L5A_SOM_L5_AMPA" presynapticPopulation="IT_L5A" postsynapticPopulation="SOM_L5" synapse="AMPA">
            <connectionWD id="0" preCellId="../IT_L5A/40/CELL_IT" postCellId="../SOM_L5/0/CELL_SOM" weight="0.00003675" delay="5.08316777141 ms"/>
            <connectionWD id="1" preCellId="../IT_L5A/45/CELL_IT" postCellId="../SOM_L5/0/CELL_SOM" weight="0.00003675" delay="5.46639178694 ms"/>
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        </projection>
        <projection id="NetConn_SOM_L5_SOM_L5_GABAB" presynapticPopulation="SOM_L5" postsynapticPopulation="SOM_L5" synapse="GABAB">
            <connectionWD id="0" preCellId="../SOM_L5/8/CELL_SOM" postCellId="../SOM_L5/0/CELL_SOM" weight="0.00015" delay="3.58464589219 ms"/>
            <connectionWD id="1" preCellId="../SOM_L5/9/CELL_SOM" postCellId="../SOM_L5/0/CELL_SOM" weight="0.00015" delay="3.00069827973 ms"/>
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        </projection>
        <projection id="NetConn_IT_L23_SOM_L5_AMPA" presynapticPopulation="IT_L23" postsynapticPopulation="SOM_L5" synapse="AMPA">
            <connectionWD id="0" preCellId="../IT_L23/9/CELL_IT" postCellId="../SOM_L5/0/CELL_SOM" weight="0.000303" delay="7.31071867403 ms"/>
            <connectionWD id="1" preCellId="../IT_L23/10/CELL_IT" postCellId="../SOM_L5/0/CELL_SOM" weight="0.000303" delay="7.47229469634 ms"/>
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        </projection>
        <projection id="NetConn_IT_L5B_PV_L6_AMPA" presynapticPopulation="IT_L5B" postsynapticPopulation="PV_L6" synapse="AMPA">
            <connectionWD id="0" preCellId="../IT_L5B/20/CELL_IT" postCellId="../PV_L6/1/CELL_PV" weight="0.00013125" delay="4.97407505469 ms"/>
            <connectionWD id="1" preCellId="../IT_L5B/21/CELL_IT" postCellId="../PV_L6/1/CELL_PV" weight="0.00013125" delay="4.04522774572 ms"/>
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        </projection>
        <projection id="NetConn_PV_L5_IT_L4_GABAA" presynapticPopulation="PV_L5" postsynapticPopulation="IT_L4" synapse="GABAA">
            <connectionWD id="0" preCellId="../PV_L5/1/CELL_PV" postCellId="../IT_L4/0/CELL_IT" weight="0.00015" delay="2.68980240534 ms"/>
            <connectionWD id="1" preCellId="../PV_L5/3/CELL_PV" postCellId="../IT_L4/0/CELL_IT" weight="0.00015" delay="2.87369370331 ms"/>
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        </projection>
        <projection id="NetConn_NetStim_background_E_IT_L4_10_1_AMPA__IT_L4" presynapticPopulation="Pop_NetStim_background_E_IT_L4_10_1_AMPA" postsynapticPopulation="IT_L4" synapse="AMPA">
            <connectionWD id="0" preCellId="../Pop_NetStim_background_E_IT_L4_10_1_AMPA[0]" postCellId="../IT_L4/0/CELL_IT" weight="0.025" delay="8.77838910353 ms"/>
            <connectionWD id="1" preCellId="../Pop_NetStim_background_E_IT_L4_10_1_AMPA[1]" postCellId="../IT_L4/1/CELL_IT" weight="0.025" delay="4.681176482 ms"/>
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        </projection>
        <projection id="NetConn_NetStim_background_E_CT_L6_10_1_AMPA__CT_L6" presynapticPopulation="Pop_NetStim_background_E_CT_L6_10_1_AMPA" postsynapticPopulation="CT_L6" synapse="AMPA">
            <connectionWD id="0" preCellId="../Pop_NetStim_background_E_CT_L6_10_1_AMPA[0]" postCellId="../CT_L6/0/CELL_CT" weight="0.025" delay="8.10242946135 ms"/>
            <connectionWD id="1" preCellId="../Pop_NetStim_background_E_CT_L6_10_1_AMPA[1]" postCellId="../CT_L6/1/CELL_CT" weight="0.025" delay="7.90249626379 ms"/>
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        </projection>
        <projection id="NetConn_NetStim_background_E_PV_L5_10_1_AMPA__PV_L5" presynapticPopulation="Pop_NetStim_background_E_PV_L5_10_1_AMPA" postsynapticPopulation="PV_L5" synapse="AMPA">
            <connectionWD id="0" preCellId="../Pop_NetStim_background_E_PV_L5_10_1_AMPA[0]" postCellId="../PV_L5/0/CELL_PV" weight="0.0125" delay="7.67738789836 ms"/>
            <connectionWD id="1" preCellId="../Pop_NetStim_background_E_PV_L5_10_1_AMPA[1]" postCellId="../PV_L5/1/CELL_PV" weight="0.0125" delay="6.62682465728 ms"/>
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        </projection>
        <projection id="NetConn_NetStim_background_E_IT_L6_10_1_AMPA__IT_L6" presynapticPopulation="Pop_NetStim_background_E_IT_L6_10_1_AMPA" postsynapticPopulation="IT_L6" synapse="AMPA">
            <connectionWD id="0" preCellId="../Pop_NetStim_background_E_IT_L6_10_1_AMPA[0]" postCellId="../IT_L6/0/CELL_IT" weight="0.025" delay="5.45613612096 ms"/>
            <connectionWD id="1" preCellId="../Pop_NetStim_background_E_IT_L6_10_1_AMPA[1]" postCellId="../IT_L6/1/CELL_IT" weight="0.025" delay="5.2217130557 ms"/>
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        </projection>
        <projection id="NetConn_NetStim_background_E_SOM_L5_10_1_AMPA__SOM_L5" presynapticPopulation="Pop_NetStim_background_E_SOM_L5_10_1_AMPA" postsynapticPopulation="SOM_L5" synapse="AMPA">
            <connectionWD id="0" preCellId="../Pop_NetStim_background_E_SOM_L5_10_1_AMPA[0]" postCellId="../SOM_L5/0/CELL_SOM" weight="0.0075" delay="7.05233528474 ms"/>
            <connectionWD id="1" preCellId="../Pop_NetStim_background_E_SOM_L5_10_1_AMPA[1]" postCellId="../SOM_L5/1/CELL_SOM" weight="0.0075" delay="7.19647796371 ms"/>
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        </projection>
        <projection id="NetConn_NetStim_background_E_SOM_L23_10_1_AMPA__SOM_L23" presynapticPopulation="Pop_NetStim_background_E_SOM_L23_10_1_AMPA" postsynapticPopulation="SOM_L23" synapse="AMPA">
            <connectionWD id="0" preCellId="../Pop_NetStim_background_E_SOM_L23_10_1_AMPA[0]" postCellId="../SOM_L23/0/CELL_SOM" weight="0.0075" delay="5.13325541667 ms"/>
            <connectionWD id="1" preCellId="../Pop_NetStim_background_E_SOM_L23_10_1_AMPA[1]" postCellId="../SOM_L23/1/CELL_SOM" weight="0.0075" delay="7.17302315504 ms"/>
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        </projection>
        <projection id="NetConn_NetStim_background_E_PT_L5B_10_1_AMPA__PT_L5B" presynapticPopulation="Pop_NetStim_background_E_PT_L5B_10_1_AMPA" postsynapticPopulation="PT_L5B" synapse="AMPA">
            <connectionWD id="0" preCellId="../Pop_NetStim_background_E_PT_L5B_10_1_AMPA[0]" postCellId="../PT_L5B/0/CELL_PT" weight="0.0375" delay="6.17695304518 ms"/>
            <connectionWD id="1" preCellId="../Pop_NetStim_background_E_PT_L5B_10_1_AMPA[1]" postCellId="../PT_L5B/1/CELL_PT" weight="0.0375" delay="5.31002009809 ms"/>
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        </projection>
        <projection id="NetConn_NetStim_background_E_SOM_L6_10_1_AMPA__SOM_L6" presynapticPopulation="Pop_NetStim_background_E_SOM_L6_10_1_AMPA" postsynapticPopulation="SOM_L6" synapse="AMPA">
            <connectionWD id="0" preCellId="../Pop_NetStim_background_E_SOM_L6_10_1_AMPA[0]" postCellId="../SOM_L6/0/CELL_SOM" weight="0.0075" delay="8.60967008164 ms"/>
            <connectionWD id="1" preCellId="../Pop_NetStim_background_E_SOM_L6_10_1_AMPA[1]" postCellId="../SOM_L6/1/CELL_SOM" weight="0.0075" delay="5.75167443796 ms"/>
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        </projection>
        <projection id="NetConn_NetStim_background_E_IT_L23_10_1_AMPA__IT_L23" presynapticPopulation="Pop_NetStim_background_E_IT_L23_10_1_AMPA" postsynapticPopulation="IT_L23" synapse="AMPA">
            <connectionWD id="0" preCellId="../Pop_NetStim_background_E_IT_L23_10_1_AMPA[0]" postCellId="../IT_L23/0/CELL_IT" weight="0.025" delay="6.7789337861 ms"/>
            <connectionWD id="1" preCellId="../Pop_NetStim_background_E_IT_L23_10_1_AMPA[1]" postCellId="../IT_L23/1/CELL_IT" weight="0.025" delay="8.32165279355 ms"/>
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        </projection>
        <projection id="NetConn_NetStim_background_E_PV_L6_10_1_AMPA__PV_L6" presynapticPopulation="Pop_NetStim_background_E_PV_L6_10_1_AMPA" postsynapticPopulation="PV_L6" synapse="AMPA">
            <connectionWD id="0" preCellId="../Pop_NetStim_background_E_PV_L6_10_1_AMPA[0]" postCellId="../PV_L6/0/CELL_PV" weight="0.0125" delay="6.35718530147 ms"/>
            <connectionWD id="1" preCellId="../Pop_NetStim_background_E_PV_L6_10_1_AMPA[1]" postCellId="../PV_L6/1/CELL_PV" weight="0.0125" delay="7.44594842606 ms"/>
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        </projection>
        <projection id="NetConn_NetStim_background_E_IT_L5A_10_1_AMPA__IT_L5A" presynapticPopulation="Pop_NetStim_background_E_IT_L5A_10_1_AMPA" postsynapticPopulation="IT_L5A" synapse="AMPA">
            <connectionWD id="0" preCellId="../Pop_NetStim_background_E_IT_L5A_10_1_AMPA[0]" postCellId="../IT_L5A/0/CELL_IT" weight="0.025" delay="8.25560190831 ms"/>
            <connectionWD id="1" preCellId="../Pop_NetStim_background_E_IT_L5A_10_1_AMPA[1]" postCellId="../IT_L5A/1/CELL_IT" weight="0.025" delay="5.38437855984 ms"/>
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        </projection>
        <projection id="NetConn_NetStim_background_E_IT_L5B_10_1_AMPA__IT_L5B" presynapticPopulation="Pop_NetStim_background_E_IT_L5B_10_1_AMPA" postsynapticPopulation="IT_L5B" synapse="AMPA">
            <connectionWD id="0" preCellId="../Pop_NetStim_background_E_IT_L5B_10_1_AMPA[0]" postCellId="../IT_L5B/0/CELL_IT" weight="0.025" delay="4.58055687718 ms"/>
            <connectionWD id="1" preCellId="../Pop_NetStim_background_E_IT_L5B_10_1_AMPA[1]" postCellId="../IT_L5B/1/CELL_IT" weight="0.025" delay="7.20431711859 ms"/>
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        </projection>
        <projection id="NetConn_NetStim_background_E_PV_L23_10_1_AMPA__PV_L23" presynapticPopulation="Pop_NetStim_background_E_PV_L23_10_1_AMPA" postsynapticPopulation="PV_L23" synapse="AMPA">
            <connectionWD id="0" preCellId="../Pop_NetStim_background_E_PV_L23_10_1_AMPA[0]" postCellId="../PV_L23/0/CELL_PV" weight="0.0125" delay="7.59935130326 ms"/>
            <connectionWD id="1" preCellId="../Pop_NetStim_background_E_PV_L23_10_1_AMPA[1]" postCellId="../PV_L23/1/CELL_PV" weight="0.0125" delay="9.99047728869 ms"/>
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        </projection>
    </network>
</neuroml>
