<?xml version="1.0" encoding="ISO-8859-1"?>
<neuroml xmlns="http://www.neuroml.org/schema/neuroml2" xmlns:xsi="http://www.w3.org/2001/XMLSchema-instance" xsi:schemaLocation="http://www.neuroml.org/schema/neuroml2 https://raw.github.com/NeuroML/NeuroML2/development/Schemas/NeuroML2/NeuroML_v2beta4.xsd" id="MF_AMPA">

    <notes>ChannelML file describing a synaptic mechanism</notes>

    <expTwoSynapse id="MF_AMPA" tauRise="3e-5s" tauDecay="5e-4s" gbase="1.1238527e-10S" erev="0V">

        <notes>Mossy fiber to Granule Cell AMPA synapse</notes>
</expTwoSynapse>

</neuroml>
